A := 1.6
B := 5.35
C := 20.9
B*C/A = 69.8844
D := 4*rev/min = 0.0666667 rev/s
E := 1/D = 2387.32 ms
T := .067*14.93 = 1.00031
45050/3*9 = 135150
15142*3 = 45426
15142*.75 = 11356.5
15142*.25 = 3785.5
100/360 = 0.277778
15142 + 1892 = 17034
15142*.278 = 4209.48
15142 - 4209 = 10933
