# D is the diffusion coefficient for butane in air at 0 deg C and 1 atm
D_stp := 8.8*10^-6 m^2/s = 0.01364 in^2/s
T_stp := 0 °C
T := 70 °F
P_stp := 1 atm
P := 30 in_Hg
D := D_stp*T/T_stp*P_stp/P = 0.0146557 in^2/s
C_0 := 13%
C_x := 6.5%
t := 180 s  # Time after spill
z_1 := 2*sqrt(-(D*t*ln(C_x/C_0))) = 2.70447 in
C_0 := 8%  # Our location is designed for 50% concentration regardless of blend
C_x := 4%
# Time after spill
t := 180 s
z_2 := 2*sqrt(-(D*t*ln(C_x/C_0))) = 2.70447 in
C_x == (C_0*exp(-z^2/(4*D*t))) solve, z → [-0.5*(29.2566449009*in^2*s/s)^0.5; 0.5*(29.2566449009*in^2*s/s)^0.5]
D_stp := 8.8*10^-6 m^2/s = 0.01364 in^2/s  # D is the diffusion coefficient for butane in air at 0 deg C and 1 atm
T_stp := 0 °C
T := 70 °F
P_stp := 1 atm
P := 30 in_Hg
D := D_stp*T/T_stp*P_stp/P = 0.0146557 in^2/s
C_x := 1%
t := 180 s  # Time after spill
C_0 := 13%
# Approximate height of 1.8% LEL based on Summer and Winter Blend
z_1 := 2*sqrt(-(D*t*ln(C_x/C_0))) = 5.20246 in
C_0 := 10%
z_2 := 2*sqrt(-(D*t*ln(C_x/C_0))) = 4.92921 in
C_0 := 9%
z_3 := 2*sqrt(-(D*t*ln(C_x/C_0))) = 4.81512 in
C_0 := 8%
z_4 := 2*sqrt(-(D*t*ln(C_x/C_0))) = 4.68428 in
D_stp := 8.8*10^-6 m^2/s = 0.01364 in^2/s  # D is the diffusion coefficient for butane in air at 0 deg C and 1 atm
T_stp := 0 °C
T := 70 °F
P_stp := 1 atm
P := 30 in_Hg
D := D_stp*T/T_stp*P_stp/P = 0.0146557 in^2/s
C_0 := 8%
t := 180 s  # Time after spill
# Gaussian Diffusion Equation:
# C(z,t) is the concentration of butane vapor at height "𝑧" above the floor after time "t".
C_X(z) := (C_0*exp(-z^2/(4*D*t)))*100
z := [0; 1; 2; 2.75; 3; 4; 5; 6; 7] in  # Height above floor
C_x_1 := C_X(z) = [8; 7.27667; 5.47597; 3.90696; 3.40938; 1.75621; 0.748448; 0.263896; 0.0769821]  # Above about 6", the vapor concentration is low.
D_stp := 8.8*10^-6 m^2/s = 0.01364 in^2/s  # D is the diffusion coefficient for butane in air at 0 deg C and 1 atm
T_stp := 0 °C
T := 70 °F
P_stp := 1 atm
P := 30 in_Hg
D := D_stp*T/T_stp*P_stp/P = 0.0146557 in^2/s
C_0 := 13%
t := 180 s  # Time after spill
# Gaussian Diffusion Equation:
# C(z,t) is the concentration of butane vapor at height "𝑧" above the floor after time "t".
C_X(z) := (C_0*exp(-z^2/(4*D*t)))*100
z := [0; 1; 2; 2.75; 3; 4; 5; 6; 7] in  # Height above floor
C_x_2 := C_X(z) = [13; 11.8246; 8.89846; 6.34881; 5.54025; 2.85384; 1.21623; 0.428831; 0.125096]  # Above about 6", the vapor concentration is low.
Vapor_low := C_x_1[3] = 3.90696  # Summer Blend (lower concentration at 2.75")
Vapor_high := C_x_2[3] = 6.34881  # Winter Blend (lower concentration at 2.75")
