# 24 Hour Symbolic Calculations
T_WH_setpoint := 125 °R
T_inlet_setpoint := 58 °R
T_amb_nom := 67.5 °R
ui := (T_WH_setpoint - T_inlet_setpoint) = 67 °R
# Mass of each draw
# Draw amount in gallons
# (Need hot water gallons)
M_all := [M_0; M_1; M_2; M_3; M_4; M_5; M_6; M_7; M_8; M_9; M_10; M_11] → [M_0; M_1; M_2; M_3; M_4; M_5; M_6; M_7; M_8; M_9; M_10; M_11]
# Outlet Temp Cluster | Inlet Temp Cluster
T_del_all := [T_del0; T_del1; T_del2; T_del3; T_del4; T_del5; T_del6; T_del7; T_del8; T_del9; T_del10; T_del11] → [T_del0; T_del1; T_del2; T_del3; T_del4; T_del5; T_del6; T_del7; T_del8; T_del9; T_del10; T_del11]
T_in_all := [T_in0; T_in1; T_in2; T_in3; T_in4; T_in5; T_in6; T_in7; T_in8; T_in9; T_in10; T_in11] → [T_in0; T_in1; T_in2; T_in3; T_in4; T_in5; T_in6; T_in7; T_in8; T_in9; T_in10; T_in11]
η_r := 0.98  # disabled
Q_stby := Q_suf - Q_su0 → Q_suf - Q_su0
Q_hr := (Q_stby - (V_st*ρ_standby*C_p_standby*(T_suf - T_su0)/η_r))/τ_stby_1 → (Q_suf - Q_su0 + V_st*ρ_standby*C_p_standby*(T_su0 - T_suf)/η_r)/τ_stby_1
UA := Q_hr/(T_tstby - T_astby) → -(Q_suf - Q_su0 + V_st*ρ_standby*C_p_standby*(T_su0 - T_suf)/η_r)/(τ_stby_1*(T_astby - T_tstby))
Q := Q_f + Q_e → Q_e + Q_f
Q_d := Q - V_st*ρ_24*C_p_24*(T_24 - T_0)/η_r → Q_e + Q_f + V_st*ρ_24*C_p_24*(T_0 - T_24)/η_r
Q_da := Q_d - (T_amb_nom - T_astby2)*UA*τ_stby2 → Q_e + Q_f - τ_stby2*(T_astby2 + (-67.5*°R))*(Q_suf - Q_su0 + V_st*ρ_standby*C_p_standby*(T_su0 - T_suf)/η_r)/(τ_stby_1*(T_astby - T_tstby)) + V_st*ρ_24*C_p_24*(T_0 - T_24)/η_r
Q_HW := vectorize(M_all*C_pHW*(T_del_all - T_in_all)/η_r) → [
    -M_0*C_pHW*(T_in0 - T_del0)/η_r;
    -M_1*C_pHW*(T_in1 - T_del1)/η_r;
    -M_2*C_pHW*(T_in2 - T_del2)/η_r;
    -M_3*C_pHW*(T_in3 - T_del3)/η_r;
    -M_4*C_pHW*(T_in4 - T_del4)/η_r;
    -M_5*C_pHW*(T_in5 - T_del5)/η_r;
    -M_6*C_pHW*(T_in6 - T_del6)/η_r;
    -M_7*C_pHW*(T_in7 - T_del7)/η_r;
    -M_8*C_pHW*(T_in8 - T_del8)/η_r;
    -M_9*C_pHW*(T_in9 - T_del9)/η_r;
    -M_10*C_pHW*(T_in10 - T_del10)/η_r;
    -M_11*C_pHW*(T_in11 - T_del11)/η_r
]
Q_HW67 := M_all*C_pHW*(T_WH_setpoint - T_inlet_setpoint)/η_r → [
    67*°R*M_0*C_pHW/η_r;
    67*°R*M_1*C_pHW/η_r;
    67*°R*M_2*C_pHW/η_r;
    67*°R*M_3*C_pHW/η_r;
    67*°R*M_4*C_pHW/η_r;
    67*°R*M_5*C_pHW/η_r;
    67*°R*M_6*C_pHW/η_r;
    67*°R*M_7*C_pHW/η_r;
    67*°R*M_8*C_pHW/η_r;
    67*°R*M_9*C_pHW/η_r;
    67*°R*M_10*C_pHW/η_r;
    67*°R*M_11*C_pHW/η_r
]
Q_HWD := Q_HW67 - Q_HW → [
    M_0*C_pHW*(T_in0 - T_del0)/η_r + 67*°R*M_0*C_pHW/η_r;
    M_1*C_pHW*(T_in1 - T_del1)/η_r + 67*°R*M_1*C_pHW/η_r;
    M_2*C_pHW*(T_in2 - T_del2)/η_r + 67*°R*M_2*C_pHW/η_r;
    M_3*C_pHW*(T_in3 - T_del3)/η_r + 67*°R*M_3*C_pHW/η_r;
    M_4*C_pHW*(T_in4 - T_del4)/η_r + 67*°R*M_4*C_pHW/η_r;
    M_5*C_pHW*(T_in5 - T_del5)/η_r + 67*°R*M_5*C_pHW/η_r;
    M_6*C_pHW*(T_in6 - T_del6)/η_r + 67*°R*M_6*C_pHW/η_r;
    M_7*C_pHW*(T_in7 - T_del7)/η_r + 67*°R*M_7*C_pHW/η_r;
    M_8*C_pHW*(T_in8 - T_del8)/η_r + 67*°R*M_8*C_pHW/η_r;
    M_9*C_pHW*(T_in9 - T_del9)/η_r + 67*°R*M_9*C_pHW/η_r;
    M_10*C_pHW*(T_in10 - T_del10)/η_r + 67*°R*M_10*C_pHW/η_r;
    M_11*C_pHW*(T_in11 - T_del11)/η_r + 67*°R*M_11*C_pHW/η_r
]
Q_dm := Q_da + Q_HWD → [
    Q_e + Q_f + M_0*C_pHW*(T_in0 - T_del0)/η_r + 67*°R*M_0*C_pHW/η_r - τ_stby2*(T_astby2 + (-67.5*°R))*(Q_suf - Q_su0 + V_st*ρ_standby*C_p_standby*(T_su0 - T_suf)/η_r)/(τ_stby_1*(T_astby - T_tstby)) + V_st*ρ_24*C_p_24*(T_0 - T_24)/η_r;
    Q_e + Q_f + M_1*C_pHW*(T_in1 - T_del1)/η_r + 67*°R*M_1*C_pHW/η_r - τ_stby2*(T_astby2 + (-67.5*°R))*(Q_suf - Q_su0 + V_st*ρ_standby*C_p_standby*(T_su0 - T_suf)/η_r)/(τ_stby_1*(T_astby - T_tstby)) + V_st*ρ_24*C_p_24*(T_0 - T_24)/η_r;
    Q_e + Q_f + M_2*C_pHW*(T_in2 - T_del2)/η_r + 67*°R*M_2*C_pHW/η_r - τ_stby2*(T_astby2 + (-67.5*°R))*(Q_suf - Q_su0 + V_st*ρ_standby*C_p_standby*(T_su0 - T_suf)/η_r)/(τ_stby_1*(T_astby - T_tstby)) + V_st*ρ_24*C_p_24*(T_0 - T_24)/η_r;
    Q_e + Q_f + M_3*C_pHW*(T_in3 - T_del3)/η_r + 67*°R*M_3*C_pHW/η_r - τ_stby2*(T_astby2 + (-67.5*°R))*(Q_suf - Q_su0 + V_st*ρ_standby*C_p_standby*(T_su0 - T_suf)/η_r)/(τ_stby_1*(T_astby - T_tstby)) + V_st*ρ_24*C_p_24*(T_0 - T_24)/η_r;
    Q_e + Q_f + M_4*C_pHW*(T_in4 - T_del4)/η_r + 67*°R*M_4*C_pHW/η_r - τ_stby2*(T_astby2 + (-67.5*°R))*(Q_suf - Q_su0 + V_st*ρ_standby*C_p_standby*(T_su0 - T_suf)/η_r)/(τ_stby_1*(T_astby - T_tstby)) + V_st*ρ_24*C_p_24*(T_0 - T_24)/η_r;
    Q_e + Q_f + M_5*C_pHW*(T_in5 - T_del5)/η_r + 67*°R*M_5*C_pHW/η_r - τ_stby2*(T_astby2 + (-67.5*°R))*(Q_suf - Q_su0 + V_st*ρ_standby*C_p_standby*(T_su0 - T_suf)/η_r)/(τ_stby_1*(T_astby - T_tstby)) + V_st*ρ_24*C_p_24*(T_0 - T_24)/η_r;
    Q_e + Q_f + M_6*C_pHW*(T_in6 - T_del6)/η_r + 67*°R*M_6*C_pHW/η_r - τ_stby2*(T_astby2 + (-67.5*°R))*(Q_suf - Q_su0 + V_st*ρ_standby*C_p_standby*(T_su0 - T_suf)/η_r)/(τ_stby_1*(T_astby - T_tstby)) + V_st*ρ_24*C_p_24*(T_0 - T_24)/η_r;
    Q_e + Q_f + M_7*C_pHW*(T_in7 - T_del7)/η_r + 67*°R*M_7*C_pHW/η_r - τ_stby2*(T_astby2 + (-67.5*°R))*(Q_suf - Q_su0 + V_st*ρ_standby*C_p_standby*(T_su0 - T_suf)/η_r)/(τ_stby_1*(T_astby - T_tstby)) + V_st*ρ_24*C_p_24*(T_0 - T_24)/η_r;
    Q_e + Q_f + M_8*C_pHW*(T_in8 - T_del8)/η_r + 67*°R*M_8*C_pHW/η_r - τ_stby2*(T_astby2 + (-67.5*°R))*(Q_suf - Q_su0 + V_st*ρ_standby*C_p_standby*(T_su0 - T_suf)/η_r)/(τ_stby_1*(T_astby - T_tstby)) + V_st*ρ_24*C_p_24*(T_0 - T_24)/η_r;
    Q_e + Q_f + M_9*C_pHW*(T_in9 - T_del9)/η_r + 67*°R*M_9*C_pHW/η_r - τ_stby2*(T_astby2 + (-67.5*°R))*(Q_suf - Q_su0 + V_st*ρ_standby*C_p_standby*(T_su0 - T_suf)/η_r)/(τ_stby_1*(T_astby - T_tstby)) + V_st*ρ_24*C_p_24*(T_0 - T_24)/η_r;
    Q_e + Q_f + M_10*C_pHW*(T_in10 - T_del10)/η_r + 67*°R*M_10*C_pHW/η_r - τ_stby2*(T_astby2 + (-67.5*°R))*(Q_suf - Q_su0 + V_st*ρ_standby*C_p_standby*(T_su0 - T_suf)/η_r)/(τ_stby_1*(T_astby - T_tstby)) + V_st*ρ_24*C_p_24*(T_0 - T_24)/η_r;
    Q_e + Q_f + M_11*C_pHW*(T_in11 - T_del11)/η_r + 67*°R*M_11*C_pHW/η_r - τ_stby2*(T_astby2 + (-67.5*°R))*(Q_suf - Q_su0 + V_st*ρ_standby*C_p_standby*(T_su0 - T_suf)/η_r)/(τ_stby_1*(T_astby - T_tstby)) + V_st*ρ_24*C_p_24*(T_0 - T_24)/η_r
]
UEF := vectorize(M_all*C_pUEF*(T_WH_setpoint - T_inlet_setpoint)/Q_dm) → [
    67*°R*M_0*C_pUEF/(Q_e + Q_f + M_0*C_pHW*(T_in0 - T_del0)/η_r + 67*°R*M_0*C_pHW/η_r - τ_stby2*(T_astby2 + (-67.5*°R))*(Q_suf - Q_su0 + V_st*ρ_standby*C_p_standby*(T_su0 - T_suf)/η_r)/(τ_stby_1*(T_astby - T_tstby)) + V_st*ρ_24*C_p_24*(T_0 - T_24)/η_r);
    67*°R*M_1*C_pUEF/(Q_e + Q_f + M_1*C_pHW*(T_in1 - T_del1)/η_r + 67*°R*M_1*C_pHW/η_r - τ_stby2*(T_astby2 + (-67.5*°R))*(Q_suf - Q_su0 + V_st*ρ_standby*C_p_standby*(T_su0 - T_suf)/η_r)/(τ_stby_1*(T_astby - T_tstby)) + V_st*ρ_24*C_p_24*(T_0 - T_24)/η_r);
    67*°R*M_2*C_pUEF/(Q_e + Q_f + M_2*C_pHW*(T_in2 - T_del2)/η_r + 67*°R*M_2*C_pHW/η_r - τ_stby2*(T_astby2 + (-67.5*°R))*(Q_suf - Q_su0 + V_st*ρ_standby*C_p_standby*(T_su0 - T_suf)/η_r)/(τ_stby_1*(T_astby - T_tstby)) + V_st*ρ_24*C_p_24*(T_0 - T_24)/η_r);
    67*°R*M_3*C_pUEF/(Q_e + Q_f + M_3*C_pHW*(T_in3 - T_del3)/η_r + 67*°R*M_3*C_pHW/η_r - τ_stby2*(T_astby2 + (-67.5*°R))*(Q_suf - Q_su0 + V_st*ρ_standby*C_p_standby*(T_su0 - T_suf)/η_r)/(τ_stby_1*(T_astby - T_tstby)) + V_st*ρ_24*C_p_24*(T_0 - T_24)/η_r);
    67*°R*M_4*C_pUEF/(Q_e + Q_f + M_4*C_pHW*(T_in4 - T_del4)/η_r + 67*°R*M_4*C_pHW/η_r - τ_stby2*(T_astby2 + (-67.5*°R))*(Q_suf - Q_su0 + V_st*ρ_standby*C_p_standby*(T_su0 - T_suf)/η_r)/(τ_stby_1*(T_astby - T_tstby)) + V_st*ρ_24*C_p_24*(T_0 - T_24)/η_r);
    67*°R*M_5*C_pUEF/(Q_e + Q_f + M_5*C_pHW*(T_in5 - T_del5)/η_r + 67*°R*M_5*C_pHW/η_r - τ_stby2*(T_astby2 + (-67.5*°R))*(Q_suf - Q_su0 + V_st*ρ_standby*C_p_standby*(T_su0 - T_suf)/η_r)/(τ_stby_1*(T_astby - T_tstby)) + V_st*ρ_24*C_p_24*(T_0 - T_24)/η_r);
    67*°R*M_6*C_pUEF/(Q_e + Q_f + M_6*C_pHW*(T_in6 - T_del6)/η_r + 67*°R*M_6*C_pHW/η_r - τ_stby2*(T_astby2 + (-67.5*°R))*(Q_suf - Q_su0 + V_st*ρ_standby*C_p_standby*(T_su0 - T_suf)/η_r)/(τ_stby_1*(T_astby - T_tstby)) + V_st*ρ_24*C_p_24*(T_0 - T_24)/η_r);
    67*°R*M_7*C_pUEF/(Q_e + Q_f + M_7*C_pHW*(T_in7 - T_del7)/η_r + 67*°R*M_7*C_pHW/η_r - τ_stby2*(T_astby2 + (-67.5*°R))*(Q_suf - Q_su0 + V_st*ρ_standby*C_p_standby*(T_su0 - T_suf)/η_r)/(τ_stby_1*(T_astby - T_tstby)) + V_st*ρ_24*C_p_24*(T_0 - T_24)/η_r);
    67*°R*M_8*C_pUEF/(Q_e + Q_f + M_8*C_pHW*(T_in8 - T_del8)/η_r + 67*°R*M_8*C_pHW/η_r - τ_stby2*(T_astby2 + (-67.5*°R))*(Q_suf - Q_su0 + V_st*ρ_standby*C_p_standby*(T_su0 - T_suf)/η_r)/(τ_stby_1*(T_astby - T_tstby)) + V_st*ρ_24*C_p_24*(T_0 - T_24)/η_r);
    67*°R*M_9*C_pUEF/(Q_e + Q_f + M_9*C_pHW*(T_in9 - T_del9)/η_r + 67*°R*M_9*C_pHW/η_r - τ_stby2*(T_astby2 + (-67.5*°R))*(Q_suf - Q_su0 + V_st*ρ_standby*C_p_standby*(T_su0 - T_suf)/η_r)/(τ_stby_1*(T_astby - T_tstby)) + V_st*ρ_24*C_p_24*(T_0 - T_24)/η_r);
    67*°R*M_10*C_pUEF/(Q_e + Q_f + M_10*C_pHW*(T_in10 - T_del10)/η_r + 67*°R*M_10*C_pHW/η_r - τ_stby2*(T_astby2 + (-67.5*°R))*(Q_suf - Q_su0 + V_st*ρ_standby*C_p_standby*(T_su0 - T_suf)/η_r)/(τ_stby_1*(T_astby - T_tstby)) + V_st*ρ_24*C_p_24*(T_0 - T_24)/η_r);
    67*°R*M_11*C_pUEF/(Q_e + Q_f + M_11*C_pHW*(T_in11 - T_del11)/η_r + 67*°R*M_11*C_pHW/η_r - τ_stby2*(T_astby2 + (-67.5*°R))*(Q_suf - Q_su0 + V_st*ρ_standby*C_p_standby*(T_su0 - T_suf)/η_r)/(τ_stby_1*(T_astby - T_tstby)) + V_st*ρ_24*C_p_24*(T_0 - T_24)/η_r)
]
