# 24 Hour Water Heater DOE Test Calculations
T_WH_setpoint := 125 °F
T_inlet_setpoint := 58 °F  # These are constants. Do NOT change
T_amb_nom := 67.5 °F
V_st := 30.34 gal  # the storage capacity of the water heater
# The volume of water removed during each draw on the hot side
Draw_amounts_actual := [14.95; 1.98; 8.95; 8.96; 4.99; 0.97; 0.98; 0.97; 0.98; 1.99; 2.02; 6.99] gal
Draw_theoretical_hot := [15; 2; 9; 9; 5; 1; 1; 1; 1; 2; 2; 7] gal
# average temperature deliverd during each draw | average temperature supplied during each draw
T_del_all := [120.888; 120.47; 123.275; 123.172; 125.336; 127.845; 123.938; 124.291; 122.297; 122.877; 126.275; 124.747] °F
T_in_all := [62.6869; 56.8612; 58.892; 57.3596; 57.123; 56.7179; 56.9414; 56.6618; 56.5621; 57.0078; 56.8831; 57.1743] °F
Q_su0 := 22184.92040 BTU  # Cumulative Energy used from the start of the 1st draw to the Tsu temperature
Q_suf := 22488.5024 BTU  # Cumulative Energy used from the start of the 1st draw to the Tsuf temperature
τ_stby := 0.59528 hr  # Time duration beween Tsu and Tsuf
T_suf := 122.93333 °F  # TC Tree Average for the 1 minute prior to the draw directly after the 1st cluster
T_su0 := 122.9667 °F  # Maximum TC Tree Temperature between the 1st cluster and the next draw
T_tstby := 122.9171 °F  # Average mean tank temperature during tstby,1
T_astby := 67.22705 °F  # Average ambient temperature during tstby,1
T_24 := 121.66667 °F  # TC Tree Temperature at 24 hours
Q_r := 8641.9676 BTU
# energy consumption of water heater from the beginning of the test to the end of the first recovery period following the first draw, which may extend beyond subsequent draws
T_0 := 121.2 °F  # Initial mean tank temp as observed 1 minute prior to start
T_max1 := 118.5333 °F  # Max mean tank temp after the FIRST recovery event.
Q_e := 0 BTU  # Total energy used during the 24 hour simulated use test (Q24-Q0)
Q_f := 48982.1568 BTU  # total fossil fuel energy used by the water heater during the 24-hour simulated-use test, Btu (kJ)
T_astby2 := 67.55754 °F  # Average ambient temp during all standby time.
# Number of hours in 24 simulated-use test when water is NOT being withdrawn from the tank. (Standby time)
τ_stby2 := 23.40194 hr
# Avg water outlet temp during the first draw cluster. Must take acutal data in rows, then average all together.
T_del1 := 120.887666 °F
T_in1 := 62.686907 °F  # Avg water inlet temp during the first draw cluster. Take data from rows
n := rows(Draw_amounts_actual) - 1 = 11  # Mathcad is zero indexed
# Specific Heat of the first draw evaluated at (125F + 58F)/2
# (60 to 80 DegF Cp = .998, 80-100 Cp = .999, 100-180 Cp = 1)
(T_del1 + T_in1)/2 = 91.7873 °F
# Recovery EFF: specific heat of the withdrawn water evaluated at (T̅del,1 + T̅in,1)/2
C_p1 := 0.999 BTU/(lb*Δ°F)
(T_max1 + T_0)/2 = 119.867 °F
# Recovery EFF: specific heat of stored hot water evaluated at (T̅max,1 + T̅o)/2
C_p2 := 1 BTU/(lb*Δ°F)
(T_suf + T_su0)/2 = 122.95 °F
# Hourly Standby Loss:specific heat of the stored water, (T̅su,f + T̅su,0)/2
C_p_standby := 1 BTU/(lb*Δ°F)
(T_24 + T_0)/2 = 121.433 °F  # Daily Water Heating Consumption: specific heat of the stored water, evaluated at (T̅24 + T̅0)/2
C_p_24 := 1 BTU/(lb*Δ°F)
(T_WH_setpoint + T_inlet_setpoint)/2 = 91.5 °F  # Uniform EF (UEF) Cp
C_pUEF := 0.999 BTU/(lb*Δ°F)  # UEF: the specific heat of the water of the ith draw, evaluated at (125 °F + 58 °F)/2 = 91.5 °F
# Specific Heat of the first draw evaluated at (125F + 58F)/2
# (60 to 80 DegF Cp = .998, 80-100 Cp = .999, 100-180 Cp = 1)
# Adjusted Daily Water Heating Energy Consumption (HW)
(T_del_all + T_in_all)/2 = [91.7875; 88.6656; 91.0835; 90.2658; 91.2295; 92.2815; 90.4397; 90.4764; 89.4296; 89.9424; 91.5791; 90.9607] °F
C_pHW := [0.999; 0.999; 0.999; 0.999; 0.999; 0.999; 0.999; 0.999; 0.999; 0.999; 0.999; 0.999] BTU/(lb*Δ°F)  # Used in the calculation for Qhw
# Formulations for the Thermodynamic Properties of the Satursted Phases of H2O from 173.15 to 473.15 DegK. R.W.Hyland, A. Wexler
Upper_1 := -2403.360201 kg/m^3
Upper_2 := -1.40758895 kg/(m^3*K^1)
Upper_3 := 0.106828766 kg/(m^3*K^2)
Upper_4 := -0.000291449 kg/(m^3*K^3)
Upper_5 := 3.73498*10^-7 kg/(m^3*K^4)
Upper_6 := -2.12038*10^-10 kg/(m^3*K^5)
Lower_1 := -3.424442728 kg/m^3
Lower_2 := 0.01619785 kg/(m^3*K^1)
ρ_upper(x) := Upper_6*x^5 + Upper_5*x^4 + Upper_4*x^3 + Upper_3*x^2 + Upper_2*x + Upper_1
ρ_lower(x) := Lower_2*x + Lower_1
ρ(x) := ρ_upper(x)/ρ_lower(x)*(1 kg/m^3)
ρ_supply_all := ρ(T_in_all) = [8.33477; 8.33896; 8.33762; 8.33865; 8.3388; 8.33905; 8.33891; 8.33909; 8.33915; 8.33887; 8.33895; 8.33876] lb/gal
ρ_actual_all := ρ(T_del_all) = [8.24756; 8.24843; 8.24255; 8.24277; 8.23816; 8.23271; 8.24115; 8.24039; 8.24462; 8.2434; 8.23613; 8.23942] lb/gal
(T_max1 + T_0)/2 = 119.867 °F
ρ_2 := ρ((T_max1 + T_0)/2) = 8.24967 lb/gal
(T_suf + T_su0)/2 = 122.95 °F
ρ_standby := ρ((T_suf + T_su0)/2) = 8.24324 lb/gal
(T_24 + T_0)/2 = 121.433 °F
ρ_24 := ρ((T_24 + T_0)/2) = 8.24642 lb/gal
(T_del1 + T_in1)/2 = 91.7873 °F
ρ_η := ρ((T_del1 + T_in1)/2) = 8.30028 lb/gal
# Recovery EFF: density of stored hot water evaluated at (T̅max,1 + T̅o)/2
# Hourly Standby Loss:density of stored hot water, (T̅su,f + T̅su,0)/2
# Daily Water Heating Consumption: density of the stored hot water, evaluated at (T̅24 + T̅0)/2
# Avg water outlet temp at first draw
# This section is used for the recovery efficiency. Determine mass of water removed
# Determine mass of water
M_all_η := vectorize(ρ_η*Draw_amounts_actual) = [124.089; 16.4346; 74.2875; 74.3705; 41.4184; 8.05127; 8.13427; 8.05127; 8.13427; 16.5176; 16.7666; 58.0189] lbm
M_cluster := [M_all_η[0]] = [124.089] lbm
# total mass removed from the start of the 24-hour simulated-use test to the end of the first recovery period
M_cluster_sum := sum(M_cluster) = 124.089 lbm
# This section is used for the Qhw section. Check with Alan. I believe the Omega meters will use the hot water density rather than the cold water density. This is because the omegas are located on the outlet of the water heater.
# Using supply density since the flow meter is on the inlet side (Coriolis type). This tells what was delivered to tank
M_all := vectorize(ρ_actual_all*Draw_amounts_actual) = [123.301; 16.3319; 73.7709; 73.8552; 41.1084; 7.98572; 8.07632; 7.99318; 8.07972; 16.4044; 16.637; 57.5935] lbm
# Recovery Efficiency
η_r := M_cluster_sum*C_p1*(T_del1 - T_in1)/Q_r + V_st*ρ_2*C_p2*(T_max1 - T_0)/Q_r = 0.757628
# Hourly Standby Losses
Q_stby := Q_suf - Q_su0 = 303.582 BTU
# the hourly standby energy losses of the water heater, Btu/h
Q_hr := (Q_stby - (V_st*ρ_standby*C_p_standby*(T_suf - T_su0)/η_r))/τ_stby = 528.487 BTU/hr
# standby heat loss coefficient of the storage tank, Btu/(h· °F)
UA := Q_hr/(T_tstby - T_astby) = 9.48979 BTU/(hr*Δ°F)
# Daily Water Heating Consumption
# total energy used by the water heater during the 24-hour simulated-use test, including auxiliary energy such as pilot lights, pumps, fans, etc
Q := Q_f + Q_e = 48982.2 BTU
# The daily water heating energy consumption
Q_d := Q - V_st*ρ_24*C_p_24*(T_24 - T_0)/η_r = 48828 BTU
# Adjusted Daily Water Heating Energy Consumption
Q_da := Q_d - (T_amb_nom - T_astby2)*UA*τ_stby2 = 48840.8 BTU
# Adjusted Daily Water Heating Energy Consumption (125-58) Temperature Adjustment
Q_HW := sum(vectorize(M_all*C_pHW*(T_del_all - T_in_all)/η_r)) = 38155.9 BTU
# Energy used to heat water (Btu/day)
# Energy used to heat water over 67 oF (Btu/day)
Q_HW67 := sum(vectorize(M_all*C_pHW*(T_WH_setpoint - T_inlet_setpoint)/η_r)) = 39855.9 BTU
# Modified Daily Water Heating Energy Consumption (Btu/day)
Q_HWD := Q_HW67 - Q_HW = 1699.97 BTU
Q_dm := Q_da + Q_HWD = 50540.8 BTU
# Uniform Energy Factor (UEF)
C_pUEF = 0.999 BTU/(lb*Δ°F)
UEF := sum(vectorize(M_all*C_pUEF*(T_WH_setpoint - T_inlet_setpoint)/Q_dm)) = 0.597457
