# 24 Hour Water Heater DOE Test Calculations
T_WH_setpoint := 125 °F
T_inlet_setpoint := 58 °F  # These are constants. Do NOT change
T_amb_nom := 67.5 °F
V_st := 38.47 gal  # the storage capacity of the water heater
# The volume of water removed during each draw on the hot side
Draw_amounts_actual := [27.182; 2.097; 1.125; 9.128; 15.304; 5.163; 1.118; 1.115; 1.131; 2.092; 2.093; 2.216; 2.204; 14.261] gal
Draw_theoretical_hot := [27; 2; 1; 9; 15; 5; 1; 1; 1; 2; 2; 2; 2; 14] gal
# average temperature deliverd during each draw | average temperature supplied during each draw
T_del_all := [121.708; 129.534; 127.127; 128.153; 129.118; 137.01; 137.316; 136.267; 138.447; 134.149; 137.367; 138.968; 140.735; 140.935] °F
T_in_all := [58.3207; 58.5278; 58.6179; 58.3163; 58.3427; 58.3093; 58.6224; 58.6455; 58.6697; 58.3111; 58.408; 58.3192; 58.2603; 58.2129] °F
Q_su0 := 31945.2258 BTU  # Cumulative Energy used from the start of the 1st draw to the Tsu temperature
Q_suf := 35982.8766 BTU  # Cumulative Energy used from the start of the 1st draw to the Tsuf temperature
τ_stby := 8.16111 hr  # Time duration beween Tsu and Tsuf
T_suf := 127.983 °F  # TC Tree Average for the 1 minute prior to the draw directly after the 1st cluster
T_su0 := 130.25 °F  # Maximum TC Tree Temperature between the 1st cluster and the next draw
T_tstby := 129.06943 °F  # Average mean tank temperature during tstby,1
T_astby := 69.08215 °F  # Average ambient temperature during tstby,1
T_24 := 129.667 °F  # TC Tree Temperature at 24 hours
Q_r := 22788.0862 BTU
# energy consumption of water heater from the beginning of the test to the end of the first recovery period following the first draw, which may extend beyond subsequent draws
T_0 := 121.15 °F  # Initial mean tank temp as observed 1 minute prior to start
T_max1 := 125.8 °F  # Max mean tank temp after the FIRST recovery event.
Q_e := 0 BTU  # Total energy used during the 24 hour simulated use test (Q24-Q0)
Q_f := 83167.909 BTU  # total fossil fuel energy used by the water heater during the 24-hour simulated-use test, Btu (kJ)
T_astby2 := 68.98343 °F  # Average ambient temp during all standby time.
# Number of hours in 24 simulated-use test when water is NOT being withdrawn from the tank. (Standby time)
τ_stby2 := 23.30361 hr
# Avg water outlet temp during the first draw cluster. Must take acutal data in rows, then average all together.
T_del1 := 123.523822 °F
T_in1 := 58.382638 °F  # Avg water inlet temp during the first draw cluster. Take data from rows
n := rows(Draw_amounts_actual) - 1 = 13  # Mathcad is zero indexed
# Specific Heat of the first draw evaluated at (125F + 58F)/2
# (60 to 80 DegF Cp = .998, 80-100 Cp = .999, 100-180 Cp = 1)
(T_del1 + T_in1)/2 = 90.9532 °F
# Recovery EFF: specific heat of the withdrawn water evaluated at (T̅del,1 + T̅in,1)/2
C_p1 := 0.999 BTU/(lb*Δ°F)
(T_max1 + T_0)/2 = 123.475 °F
# Recovery EFF: specific heat of stored hot water evaluated at (T̅max,1 + T̅o)/2
C_p2 := 1 BTU/(lb*Δ°F)
(T_suf + T_su0)/2 = 129.117 °F
# Hourly Standby Loss:specific heat of the stored water, (T̅su,f + T̅su,0)/2
C_p_standby := 1 BTU/(lb*Δ°F)
(T_24 + T_0)/2 = 125.408 °F  # Daily Water Heating Consumption: specific heat of the stored water, evaluated at (T̅24 + T̅0)/2
C_p_24 := 1 BTU/(lb*Δ°F)
(T_WH_setpoint + T_inlet_setpoint)/2 = 91.5 °F  # Uniform EF (UEF) Cp
C_pUEF := 0.999 BTU/(lb*Δ°F)  # UEF: the specific heat of the water of the ith draw, evaluated at (125 °F + 58 °F)/2 = 91.5 °F
# Specific Heat of the first draw evaluated at (125F + 58F)/2
# (60 to 80 DegF Cp = .998, 80-100 Cp = .999, 100-180 Cp = 1)
# Adjusted Daily Water Heating Energy Consumption (HW)
(T_del_all + T_in_all)/2 = [90.0144; 94.0309; 92.8725; 93.2347; 93.7304; 97.6596; 97.9692; 97.4563; 98.5584; 96.2301; 97.8875; 98.6436; 99.4977; 99.574] °F
C_pHW := [0.999; 0.999; 0.999; 0.999; 0.999; 0.999; 0.999; 0.999; 0.999; 0.999; 0.999; 0.999; 0.999; 0.999] BTU/(lb*Δ°F)  # Used in the calculation for Qhw
# Formulations for the Thermodynamic Properties of the Satursted Phases of H2O from 173.15 to 473.15 DegK. R.W.Hyland, A. Wexler
Upper_1 := -2403.360201 kg/m^3
Upper_2 := -1.40758895 kg/(m^3*K^1)
Upper_3 := 0.106828766 kg/(m^3*K^2)
Upper_4 := -0.000291449 kg/(m^3*K^3)
Upper_5 := 3.73498*10^-7 kg/(m^3*K^4)
Upper_6 := -2.12038*10^-10 kg/(m^3*K^5)
Lower_1 := -3.424442728 kg/m^3
Lower_2 := 0.01619785 kg/(m^3*K^1)
ρ_upper(x) := Upper_6*x^5 + Upper_5*x^4 + Upper_4*x^3 + Upper_3*x^2 + Upper_2*x + Upper_1
ρ_lower(x) := Lower_2*x + Lower_1
ρ(x) := ρ_upper(x)/ρ_lower(x)*(1 kg/m^3)
ρ_supply_all := ρ(T_in_all) = [8.33801; 8.33787; 8.33781; 8.33801; 8.33799; 8.33802; 8.3378; 8.33779; 8.33777; 8.33802; 8.33795; 8.33801; 8.33805; 8.33808] lb/gal
ρ_actual_all := ρ(T_del_all) = [8.24585; 8.22898; 8.23428; 8.23203; 8.2299; 8.21194; 8.21122; 8.21367; 8.20856; 8.21856; 8.2111; 8.20733; 8.20313; 8.20265] lb/gal
(T_max1 + T_0)/2 = 123.475 °F
ρ_2 := ρ((T_max1 + T_0)/2) = 8.24213 lb/gal
(T_suf + T_su0)/2 = 129.117 °F
ρ_standby := ρ((T_suf + T_su0)/2) = 8.2299 lb/gal
(T_24 + T_0)/2 = 125.408 °F
ρ_24 := ρ((T_24 + T_0)/2) = 8.238 lb/gal
(T_del1 + T_in1)/2 = 90.9532 °F
ρ_η := ρ((T_del1 + T_in1)/2) = 8.30154 lb/gal
ρ_2 := 8.242093 lb/gal
ρ_standby := 8.229867 lb/gal
ρ_24 := 8.237961 lb/gal
ρ_η := 8.301505 lb/gal
# Recovery EFF: density of stored hot water evaluated at (T̅max,1 + T̅o)/2
# Hourly Standby Loss:density of stored hot water, (T̅su,f + T̅su,0)/2
# Daily Water Heating Consumption: density of the stored hot water, evaluated at (T̅24 + T̅0)/2
# Avg water outlet temp at first draw
# This section is used for the recovery efficiency. Determine mass of water removed
# Determine mass of water
M_all_η := vectorize(ρ_η*Draw_amounts_actual) = [225.652; 17.4083; 9.33919; 75.7761; 127.046; 42.8607; 9.28108; 9.25618; 9.389; 17.3667; 17.375; 18.3961; 18.2965; 118.388] lbm
M_cluster := [M_all_η[0]; M_all_η[1]; M_all_η[2]] = [225.652; 17.4083; 9.33919] lbm
# total mass removed from the start of the 24-hour simulated-use test to the end of the first recovery period
M_cluster_sum := sum(M_cluster) = 252.399 lbm
# This section is used for the Qhw section. Check with Alan. I believe the Omega meters will use the hot water density rather than the cold water density. This is because the omegas are located on the outlet of the water heater.
# Using supply density since the flow meter is on the inlet side (Coriolis type). This tells what was delivered to tank
M_all := vectorize(ρ_supply_all*Draw_amounts_actual) = [226.644; 17.4845; 9.38003; 76.1094; 127.605; 43.0492; 9.32166; 9.29663; 9.43002; 17.4431; 17.4513; 18.477; 18.3771; 118.909] lbm
# Recovery Efficiency
η_r := M_cluster_sum*C_p1*(T_del1 - T_in1)/Q_r + V_st*ρ_2*C_p2*(T_max1 - T_0)/Q_r = 0.785477
# Hourly Standby Losses
Q_stby := Q_suf - Q_su0 = 4037.65 BTU
# the hourly standby energy losses of the water heater, Btu/h
Q_hr := (Q_stby - (V_st*ρ_standby*C_p_standby*(T_suf - T_su0)/η_r))/τ_stby = 606.708 BTU/hr
# standby heat loss coefficient of the storage tank, Btu/(h· °F)
UA := Q_hr/(T_tstby - T_astby) = 10.1139 BTU/(hr*Δ°F)
# Daily Water Heating Consumption
# total energy used by the water heater during the 24-hour simulated-use test, including auxiliary energy such as pilot lights, pumps, fans, etc
Q := Q_f + Q_e = 83167.9 BTU
# The daily water heating energy consumption
Q_d := Q - V_st*ρ_24*C_p_24*(T_24 - T_0)/η_r = 79731.6 BTU
# Adjusted Daily Water Heating Energy Consumption
Q_da := Q_d - (T_amb_nom - T_astby2)*UA*τ_stby2 = 80081.2 BTU
# Adjusted Daily Water Heating Energy Consumption (125-58) Temperature Adjustment
Q_HW := sum(vectorize(M_all*C_pHW*(T_del_all - T_in_all)/η_r)) = 65799.1 BTU
# Energy used to heat water (Btu/day)
# Energy used to heat water over 67 oF (Btu/day)
Q_HW67 := sum(vectorize(M_all*C_pHW*(T_WH_setpoint - T_inlet_setpoint)/η_r)) = 61266.4 BTU
# Modified Daily Water Heating Energy Consumption (Btu/day)
Q_HWD := Q_HW67 - Q_HW = -4532.74 BTU
Q_dm := Q_da + Q_HWD = 75548.5 BTU
# Uniform Energy Factor (UEF)
C_pUEF = 0.999 BTU/(lb*Δ°F)
UEF := sum(vectorize(M_all*C_pUEF*(T_WH_setpoint - T_inlet_setpoint)/Q_dm)) = 0.636986
