# 24 Hour Water Heater DOE Test Calculations
Q_r := 16.17 ft^3*(1065.28 BTU/ft^3) + 5.02 W*hr = 17242.7 BTU
Q_e := 70.54 W*hr = 240.692 BTU
Q_f := 51.35 ft^3*(1065.28 BTU/ft^3) = 54702.1 BTU
# The volume of water removed during each draw on the hot side
Draw_amounts_actual := [26.93; 1.98; 0.98; 8.97; 15.01; 4.99; 0.98; 0.97; 0.98; 1.99; 1.99; 2.02; 2.01; 14.03] gal
n := rows(Draw_amounts_actual) - 1 = 13
# average temperature deliverd during each draw | average temperature supplied during each draw
T_del_all := [122.754; 123.036; 119.231; 123.448; 122.675; 123.084; 117.141; 111.789; 120.352; 118.647; 122.422; 122.745; 122.914; 123.219] °F
T_in_all := [57.7065; 59.2602; 57.8255; 57.5159; 57.6268; 57.3503; 57.5089; 57.7255; 57.5696; 57.6136; 58.0776; 57.5662; 57.7536; 57.6078] °F
C_p3_c := -4.903944*10^-9 BTU/(lb*Δ°F^4)
C_p2_c := 2.584046*10^-6 BTU/(lb*Δ°F^3)
C_p1_c := -0.000375475 BTU/(lb*Δ°F^2)
C_p_c := 1.015074 BTU/(lb*Δ°F)
C_p(x) := C_p3_c*x^3 + C_p2_c*x^2 + C_p1_c*x^1 + C_p_c
(T_del_all[0] + T_in_all[0])/2 = 90.2302 °F
C_p1 := C_p(90.23 Δ°F) = 0.99863 BTU/(lb*Δ°F)
C_pHW := [0.9983; 0.9983; 0.9983; 0.9983; 0.9983; 0.9983; 0.9984; 0.9985; 0.9983; 0.9984; 0.9983; 0.9983; 0.9983; 0.9983] BTU/(lb*Δ°F)
# Formulations for the Thermodynamic Properties of the Satursted Phases of H2O from 173.15 to 473.15 DegK. R.W.Hyland, A. Wexler
Upper_1 := -2403.360201 kg/m^3
Upper_2 := -1.40758895 kg/(m^3*K^1)
Upper_3 := 0.106828766 kg/(m^3*K^2)
Upper_4 := -0.000291449 kg/(m^3*K^3)
Upper_5 := 3.73498*10^-7 kg/(m^3*K^4)
Upper_6 := -2.12038*10^-10 kg/(m^3*K^5)
Lower_1 := -3.424442728 kg/m^3
Lower_2 := 0.01619785 kg/(m^3*K^1)
ρ_upper(x) := Upper_6*x^5 + Upper_5*x^4 + Upper_4*x^3 + Upper_3*x^2 + Upper_2*x + Upper_1
ρ_lower(x) := Lower_2*x + Lower_1
ρ(x) := ρ_upper(x)/ρ_lower(x)*(1 kg/m^3)
ρ_actual_all := ρ(T_del_all) = [8.24365; 8.24306; 8.25098; 8.24219; 8.24382; 8.24296; 8.25522; 8.26574; 8.24867; 8.25217; 8.24435; 8.24367; 8.24332; 8.24267] lb/gal
# density of the water at the water temperature measured at the point where the flow volume is
# measured, lb/gal (kg/L).
ρ_η := ρ(T_del_all[0]) = 8.24365 lb/gal
# This section is used for the recovery efficiency. Determine mass of water removed
M_all_η := (ρ_η*Draw_amounts_actual)[0] = 222.002 lbm
# This section is used for the Qhw section. Check with Alan. I believe the Omega meters will use the hot water density rather than the cold water density. This is because the omegas are located on the outlet of the water heater.
# Using supply density since the flow meter is on the inlet side (Coriolis type). This tells what was delivered to tank
M_all := vectorize(ρ_actual_all*Draw_amounts_actual) = [222.002; 16.3213; 8.08596; 73.9324; 123.74; 41.1324; 8.09012; 8.01777; 8.0837; 16.4218; 16.4063; 16.6522; 16.5691; 115.645] lbm
# Recovery Efficiency
η_r := M_all_η*C_p1*(T_del_all[0] - T_in_all[0])/Q_r = 0.836346
# Daily Water Heating Consumption
# total energy used by the water heater during the 24-hour simulated-use test, including auxiliary energy such as pilot lights, pumps, fans, etc
Q := Q_f + Q_e = 54942.8 BTU
# The daily water heating energy consumption
Q_d := Q = 54942.8 BTU
# Adjusted Daily Water Heating Energy Consumption (125-58) Temperature Adjustment
Q_HW := sum(vectorize(M_all*C_pHW*(T_del_all - T_in_all)/η_r)) = 53522.6 BTU
# Energy used to heat water (Btu/day)
# Energy used to heat water over 67 oF (Btu/day)
Q_HW67 := sum(vectorize(M_all*C_pHW*(125 °F - 58 °F)/η_r)) = 55270.4 BTU
Q_HWD := Q_HW67 - Q_HW = 1747.85 BTU
# Modified Daily Water Heating Energy Consumption (Btu/day)
Q_dm := Q_d + Q_HWD = 56690.7 BTU
# Uniform Energy Factor (UEF)
UEF := sum(vectorize(M_all*C_pHW*(125 °F - 58 °F)/Q_dm)) = 0.815393
# Annual Energy Consumption
UEF := 0.81
ΔT := 125 °F - 58 °F = 67 Δ°F
TotalDraw_theoretical := 55 gal
ρ_theoretical := 8.24 lb/gal
C_p_theoretical := 1 BTU/(lb*Δ°F)
E_annual := 365*TotalDraw_theoretical*ρ_theoretical*C_p_theoretical*ΔT/UEF = 13682723 BTU
LP_BTUperGal := 91500 BTU
NG_BTUperTherm := 99976.1 BTU
Therm_annual := E_annual/NG_BTUperTherm = 136.86  # NG Therm per Year
Gal_annual := E_annual/LP_BTUperGal = 149.538  # Gallons LP per Year
