# 24 Hour Water Heater DOE Test Calculations
T_WH_setpoint := 125 °F
T_inlet_setpoint := 58 °F
T_amb_nom := 67.5 °F
V_st := 45.5 gal  # the storage capacity of the water heater
# The volume of water removed during each draw on the hot side
Draw_amounts_actual := [27.11; 2.05; 1.03; 9.06; 15.09; 5.05; 1.03; 1.03; 1.03; 2.04; 2.05; 2.07; 2.06; 14.12] gal
Draw_theoretical_hot := [27; 2; 1; 9; 15; 5; 1; 1; 1; 2; 2; 2; 2; 14] gal
TotalDraw_theoretical := sum(Draw_theoretical_hot) = 84 gal
# The draw cluster varies by test type (High, Medium,Low)
Draw_supply_cluster := [Draw_amounts_actual[0]; Draw_amounts_actual[1]; Draw_amounts_actual[2]; Draw_amounts_actual[3]] = [27.11; 2.05; 1.03; 9.06] gal
# This is the High Usage Cluster
n := rows(Draw_amounts_actual) - 1 = 13  # Mathcad is zero indexed
ρ_theoretical := 8.24 lbm/gal
Q_su0 := 6603.9 BTU  # Cumulative Energy used from the start of the 1st draw to the Tsu temperature
Q_suf := 6685.8 BTU  # Cumulative Energy used from the start of the 1st draw to the Tsuf temperature
τ_stby := 5.5 hr  # Time duration beween Tsu and Tsuf
T_suf := 136 °F  # TC Tree Average for the 1 minute prior to the draw directly after the 1st cluster
T_su0 := 140.9 °F  # Maximum TC Tree Temperature between the 1st cluster and the next draw
T_tstby := 138.4 °F  # Average mean tank temperature during tstby,1
T_astby := 69.2 °F  # Average ambient temperature during tstby,1
T_24 := 137.4 °F  # TC Tree Temperature at 24 hours
# Energy consumed during the recovery test. (first cycle)  (kwh x 3412 = btu)
Q_r := 6685.8 BTU
# Initial mean tank temp as observed 1 minute prior to start
T_0 := 140.6 °F
T_max1 := 141.1 °F  # Max mean tank temp after the first cluster.
Q_e := 15509.2 BTU = 4.5453 kW*hr  # Total energy used during the 24 hour simulated use test (Q24-Q0)
Q_f := 0 BTU  # total fossil fuel energy used by the water heater during the 24-hour simulated-use test, Btu (kJ)
T_astby2 := 68.18 °F  # Average ambient temp during all standby time.
# Number of hours in 24 simulated-use test when water is NOT being withdrawn from the tank. (Standby time)
τ_stby2 := 23.35 hr
T_del_all := [126.45; 126.5108; 126.6; 126.7574; 124.3427; 126.6345; 126.0687; 126.0412; 126.1687; 124.0944; 124.0568; 123.535; 123.9; 124.7348] °F
T_del_actual := [T_del_all[0]; T_del_all[1]; T_del_all[2]; T_del_all[3]] = [126.45; 126.511; 126.6; 126.757] °F  # Outlet Temp Cluster
T_del1 := mean(T_del_actual) = 126.58 °F  # Avg water outlet temp during the first draw cluster.
T_in_all := [58.41307; 58.75946; 58.875; 58.2604; 58.46458; 58.32364; 58.83125; 59.4353; 58.8; 59.23889; 58.70541; 58.23; 58.345; 58.48539] °F
T_in := [T_in_all[0]; T_in_all[1]; T_in_all[2]; T_in_all[3]] = [58.4131; 58.7595; 58.875; 58.2604] °F
T_in1 := mean(T_in) = 58.577 °F  # Avg water inlet temp during the first draw cluster.
# Correct for Density of water at different temperatures
T_water := [32; 40; 50; 60; 70; 80; 90; 100; 120; 140; 160; 180; 200; 212] °F
Specific_weight := [8.3436; 8.3451; 8.343; 8.3378; 8.329; 8.3176; 8.3077; 8.2877; 8.2498; 8.2048; 8.1537; 8.0969; 8.0351; 7.9957] lbm/gal
# Temperature/Density Charts
ρ_poly := polyfitc(T_water, Specific_weight, 5) = [
    "Term", "Coefficient", "Std Error", "95% CI Low", "95% CI High", "VIF", "T", "P";
    "Intercept", 2555.24 kg/m^3, 8760.9, -17647.4 kg/m^3, 22757.9 kg/m^3, NaN, 0.291664, 0.388982;
    "A", -34.2246 kg/(m^3*K), 137.296 K, -350.83 kg/(m^3*K), 282.381 kg/(m^3*K), 3687389, -0.249275, 0.404714;
    "AA", 0.265265 kg/(m^3*K^2), 0.858301 K^2, -1.71398 kg/(m^3*K^2), 2.24451 kg/(m^3*K^2), 240421926, 0.309058, 0.382587;
    "AAA", -0.000953207 kg/(m^3*K^3), 0.00267549 K^3, -0.0071229 kg/(m^3*K^3), 0.00521648 kg/(m^3*K^3), 1.24926e9, -0.356274, 0.365424;
    "AAAA", 1.63081e-6 kg/(m^3*K^4), 4.15864e-6 K^4, -7.95903e-6 kg/(m^3*K^4), 1.12207e-5 kg/(m^3*K^4), 1.02028e9, 0.39215, 0.352594;
    "AAAAA", -1.08556e-9 kg/(m^3*K^5), 2.57857e-9 K^5, -7.03176e-9 kg/(m^3*K^5), 4.86064e-9 kg/(m^3*K^5), 1.57073e10, -0.420992, 0.342421
]
# Density of water based on average outlet temperature
ρ(x) := ρ_poly[4, 1]*x^3 + ρ_poly[3, 1]*x^2 + ρ_poly[2, 1]*x + ρ_poly[1, 1]
ρ_actual := ρ(T_del_actual) = [-111.605; -111.651; -111.719; -111.84] lb/gal
ρ_actual_all := ρ(T_del_all) = [-111.605; -111.651; -111.719; -111.84; -110.003; -111.746; -111.314; -111.293; -111.39; -109.816; -109.787; -109.394; -109.669; -110.3] lb/gal
ρ_supply_all := ρ(T_in_all) = [-67.1685; -67.3588; -67.4224; -67.0847; -67.1967; -67.1194; -67.3983; -67.7312; -67.3811; -67.6229; -67.3291; -67.068; -67.1311; -67.2082] lb/gal
# Recovery EFF: density of stored hot water evaluated at (T̅max,1 + T̅o)/2
ρ_2 := ρ((T_max1 + T_0)/2) = -122.959 lb/gal
# Hourly Standby Loss:density of stored hot water, (T̅su,f + T̅su,0)/2
ρ_standby := ρ((T_suf + T_su0)/2) = -121.016 lb/gal
# Daily Water Heating Consumption: density of the stored hot water, evaluated at (T̅24 + T̅0)/2
ρ_24 := ρ((T_24 + T_0)/2) = -121.46 lb/gal
# Determine mass of water removed
# Determine mass of water
M_all := vectorize(ρ_actual_all*Draw_amounts_actual) = [-3025.61; -228.885; -115.071; -1013.27; -1659.95; -564.316; -114.653; -114.632; -114.732; -224.024; -225.064; -226.445; -225.918; -1557.44] lbm
M_cluster := [M_all[0]; M_all[1]; M_all[2]; M_all[3]] = [-3025.61; -228.885; -115.071; -1013.27] lbm
# Determine Cp as function of temperature
T_water_Cp := [32; 41; 50; 59; 68; 77; 86; 95; 104; 113; 122; 131; 140; 149; 158; 167; 176; 185; 194; 203; 212] °F
C_p_water := [4217; 4202; 4192; 4185.51; 4182; 4180; 4178; 4178; 4179; 4181; 4182; 4183; 4185; 4188; 4191; 4194; 4198; 4203; 4208; 4213; 4219] J/(kg*K)
Cp_poly := polyfitc(T_water_Cp, C_p_water, 5) = [
    "Term", "Coefficient", "Std Error", "95% CI Low", "95% CI High", "VIF", "T", "P";
    "Intercept", 217465 m^2/(s^2*K), 21852.9, 170886 m^2/(s^2*K), 264043 m^2/(s^2*K), NaN, 9.95129, 2.66413e-8;
    "A", -3184.64 m^2/(s^2*K^2), 341.703 K, -3912.96 m^2/(s^2*K^2), -2456.32 m^2/(s^2*K^2), 3341186, -9.3199, 6.25962e-8;
    "AA", 19.005 m^2/(s^2*K^3), 2.13148 K^2, 14.4618 m^2/(s^2*K^3), 23.5481 m^2/(s^2*K^3), 217029514, 8.91634, 1.10501e-7;
    "AAA", -0.056652 m^2/(s^2*K^4), 0.00663012 K^3, -0.0707838 m^2/(s^2*K^4), -0.0425203 m^2/(s^2*K^4), 1.12316e9, -8.54465, 1.8956e-7;
    "AAAA", 8.43282e-5 m^2/(s^2*K^5), 1.02843e-5 K^4, 6.24076e-5 m^2/(s^2*K^5), 0.000106249 m^2/(s^2*K^5), 913416136, 8.19966, 3.17394e-7;
    "AAAAA", -5.01221e-8 m^2/(s^2*K^6), 6.36424e-9 K^5, -6.36872e-8 m^2/(s^2*K^6), -3.65571e-8 m^2/(s^2*K^6), 1.45026e10, -7.87558, 5.21941e-7
]
# Cp of water based on average outlet temperature
C_p(x) := Cp_poly[6, 1]*x^5 + Cp_poly[5, 1]*x^4 + Cp_poly[4, 1]*x^3 + Cp_poly[3, 1]*x^2 + Cp_poly[2, 1]*x + Cp_poly[1, 1]
# Recovery EFF: specific heat of the withdrawn water evaluated at (T̅del,1 + T̅in,1)/2
C_p1 := C_p((T_del1 + T_in1)/2) = 0.998018 BTU/(lbm*R)
# Recovery EFF: specific heat of stored hot water evaluated at (T̅max,1 + T̅o)/2
C_p2 := C_p((T_max1 + T_0)/2) = 0.999714 BTU/(lbm*R)
C_p_standby := C_p((T_suf + T_su0)/2) = 0.999573 BTU/(lbm*R)  # Hourly Standby Loss:specific heat of the stored water, (T̅su,f + T̅su,0)/2
C_p_24 := C_p((T_24 + T_0)/2) = 0.999605 BTU/(lbm*R)  # Daily Water Heating Consumption: specific heat of the stored water, evaluated at (T̅24 + T̅0)/2
C_pHW := C_p((T_del_all + T_in_all)/2) = [0.998017; 0.998018; 0.998019; 0.998018; 0.998013; 0.998018; 0.998017; 0.998019; 0.998018; 0.998014; 0.998013; 0.998012; 0.998012; 0.998014] BTU/(lbm*R)
# Adjusted Daily Water Heating Energy Consumption (HW)
C_pUEF := C_p((T_WH_setpoint + T_inlet_setpoint)/2) = 0.998013 BTU/(lbm*R)
# Uniform EF (UEF) Cp
# UEF: the specific heat of the water of the ith draw, evaluated at (125 °F + 58 °F)/2 = 91.5 °F
C_p_theoretical := C_p(91.5 °F) = 0.998013 BTU/(lbm*R)
# In the evaluation region...the Cp values are very close. Might try to simplify for UEF estimate
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# Recovery Efficiency
M_cluster_sum := sum(M_cluster) = -4382.83 lbm
# total mass removed from the start of the 24-hour simulated-use test to the end of the first recovery period
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η_r := M_cluster_sum*C_p1*(T_del1 - T_in1)/Q_r + V_st*ρ_2*C_p2*(T_max1 - T_0)/Q_r = -44.9085
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# Hourly Standby Losses
Q_stby := Q_suf - Q_su0 = 81.9 BTU
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# the hourly standby energy losses of the water heater, Btu/h
Q_hr := (Q_stby - (V_st*ρ_standby*C_p_standby*(T_suf - T_su0)/η_r))/τ_stby = 124.079 BTU/hr
UA := Q_hr/(T_tstby - T_astby) = 1.79304 BTU/(hr*R)  # standby heat loss coefficient of the storage tank, Btu/(h· °F)
# Daily Water Heating Consumption
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# total energy used by the water heater during the 24-hour simulated-use test, including auxiliary energy such as pilot lights, pumps, fans, etc
Q := Q_f + Q_e = 15509.2 BTU
Q_d := Q - V_st*ρ_24*C_p_24*(T_24 - T_0)/η_r = 15902.8 BTU
# The daily water heating energy consumption
# Adjusted Daily Water Heating Energy Consumption
Q_da := Q_d - (T_amb_nom - T_astby2)*UA*τ_stby2 = 15931.3 BTU
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# Adjusted Daily Water Heating Energy Consumption (125-58) Temperature Adjustment
Q_HW := M_all*C_pHW*(T_del_all - T_in_all)/η_r = [14228; 14168.3; 14162.7; 14324.2; 13776.5; 14285.3; 14060.8; 13928.7; 14088.2; 13562.7; 13666.4; 13656.7; 13709; 13854.2] BTU
# Energy used to heat water (Btu/day)
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Q_HW_Mean := mean(Q_HW) = 13962.3 BTU
# Energy used to heat water over 67 oF (Btu/day)
Q_HW67 := M_all*C_pHW*(T_WH_setpoint - T_inlet_setpoint)/η_r = 14011.1 BTU
Q_HWD := Q_HW67 - Q_HW = [-216.844; -157.121; -151.613; -313.055; 234.609; -274.129; -49.6559; 82.4147; -77.1031; 448.459; 344.76; 354.461; 302.18; 156.964] BTU
Q_HWD_Mean := mean(Q_HWD) = 48.8805 BTU
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# Modified Daily Water Heating Energy Consumption (Btu/day)
Q_dm := Q_da + Q_HWD = [15714.5; 15774.2; 15779.7; 15618.2; 16165.9; 15657.2; 15881.6; 16013.7; 15854.2; 16379.8; 16276.1; 16285.8; 16233.5; 16088.3] BTU
# Uniform Energy Factor (UEF)
UEF := sum(M_all*C_pUEF*(T_WH_setpoint - T_inlet_setpoint)/Q_dm) = -39.5642
ΔT := T_WH_setpoint - T_inlet_setpoint = 67 R
E_annual := 365*TotalDraw_theoretical*ρ_theoretical*C_p_theoretical*ΔT/UEF = -125.136 kW*hr
# Annual Electrical Energy Consumption
E_annual_e := E_annual*Q_e/Q = -125.136 kW*hr
# Annual Fossil Energy Consumption
E_annual_f := E_annual - E_annual_e = 0 kW*hr
UEF_array := M_all*C_pUEF*(T_WH_setpoint - T_inlet_setpoint)/Q_dm = [-12.8743; -0.970245; -0.487616; -4.33813; -6.86604; -2.41002; -0.482728; -0.478656; -0.483895; -0.914531; -0.92463; -0.929749; -0.930573; -6.47311]
