# 24 Hour Water Heater DOE Test Calculations
T_WH_setpoint := 125 °F
T_inlet_setpoint := 58 °F
T_amb_nom := 67.5 °F
V_st := 46 gal  # the storage capacity of the water heater
# The volume of water removed during each draw on the hot side
Draw_amounts_actual := [14.98; 1.98; 0.99; 5.98; 4; 0.98; 0.98; 0.98; 1.97; 1.97; 3.0] gal
Draw_theoretical_hot := [15; 2; 1; 6; 4; 1; 1; 1; 2; 2; 3] gal
TotalDraw_theoretical := sum(Draw_theoretical_hot) = 38 gal
TotalDraw_actual := sum(Draw_amounts_actual) = 37.81 gal
# The draw cluster varies by test type (High, Medium,Low)
Draw_supply_cluster := [Draw_amounts_actual[0]; Draw_amounts_actual[1]; Draw_amounts_actual[2]] = [14.98; 1.98; 0.99] gal
# This is the Low Usage Cluster
n := rows(Draw_amounts_actual) - 1 = 10  # Mathcad is zero indexed
ρ_theoretical := 8.24 lbm/gal
# 1st Cluster Data
T_0 := 124.7 °F  # Initial mean tank temp as observed 1 minute prior to start
Q_r := 7657.9 BTU  # Energy consumed during the recovery test. (first cycle)  (kwh x 3412 = btu)
T_su0 := 126.1 °F  # Maximum Mean TC Tree Temperature between the 1st cluster and the next draw
Q_su0 := 14385.3 BTU  # Cumulative Energy used from the start of the 1st draw to the Tsu temperature
T_suf := 125 °F  # TC Tree Average for the 1 minute prior to the draw directly after the 1st cluster
Q_suf := 15959.6 BTU  # Cumulative Energy used from the start of the 1st draw to the Tsuf temperature
τ_stby_1 := 8.4 hr  # Time duration beween Tsu and Tsuf
T_tstby := 124.2 °F  # Average mean tank temperature during tstby,1
T_astby := 68.8 °F  # Average ambient temperature during tstby,1
T_max1 := 124.8 °F  # Max mean tank temp after the first cluster.
# End of Test Data
# Number of hours in 24 simulated-use test when water is NOT being withdrawn from the tank. (Standby time)
τ_stby2 := 23.406 hr
T_astby2 := 68.9 °F  # Average ambient temp during all standby time.
Q_e := 32770.2 BTU = 9.604 kW*hr  # Total energy used during the 24 hour simulated use test (Q24-Q0)
T_24 := 123.2 °F  # TC Tree Temperature at 24 hours
Q_f := 0 BTU  # total fossil fuel energy used by the water heater during the 24-hour simulated-use test, Btu (kJ)
T_del_all := [125.5; 123.7; 125.7; 125.2; 125.1; 125.2; 124.6; 125.5; 123.3; 127; 126.6] °F
T_del_actual := [T_del_all[0]; T_del_all[1]; T_del_all[2]] = [125.5; 123.7; 125.7] °F  # Outlet Temp Cluster
T_del1 := mean(T_del_actual) = 124.967 °F  # Avg water outlet temp during the first draw cluster.
T_del1 := T_del_all[0] = 125.5 °F  # disabled
T_in_all := [58.3; 57.9; 58.3; 58.2; 58.2; 58.0; 57.7; 58.3; 57.3; 58.2; 57.8] °F
T_in := [T_in_all[0]; T_in_all[1]; T_in_all[2]] = [58.3; 57.9; 58.3] °F
T_in1 := mean(T_in) = 58.1667 °F  # Avg water inlet temp during the first draw cluster.
T_in1 := T_in_all[0] = 58.3 °F  # disabled
# Correct for Density of water at different temperatures
T_water := [32; 40; 50; 60; 70; 80; 90; 100; 120; 140; 160; 180; 200; 212] °F
Specific_weight := [8.3436; 8.3451; 8.343; 8.3378; 8.329; 8.3176; 8.3077; 8.2877; 8.2498; 8.2048; 8.1537; 8.0969; 8.0351; 7.9957] lbm/gal
# Temperature/Density Charts
ρ_poly := polyfitc(T_water, Specific_weight, 3) = [
    "Term", "Coefficient", "Std Error", "95% CI Low", "95% CI High", "VIF", "T", "P";
    "Intercept", 142.725 kg/m^3, 58.0108, 13.4691 kg/m^3, 271.982 kg/m^3, NaN, 2.46032, 0.016829;
    "A", 7.58969 kg/(m^3*K), 0.545416 K, 6.37443 kg/(m^3*K), 8.80496 kg/(m^3*K), 191930, 13.9154, 3.58798e-8;
    "AA", -0.0212538 kg/(m^3*K^2), 0.00170098 K^2, -0.0250438 kg/(m^3*K^2), -0.0174638 kg/(m^3*K^2), 778792, -12.495, 9.97885e-8;
    "AAA", 1.8145e-5 kg/(m^3*K^3), 1.75951e-6 K^3, 1.42245e-5 kg/(m^3*K^3), 2.20654e-5 kg/(m^3*K^3), 198443, 10.3125, 5.99031e-7
]
# Density of water based on average outlet temperature
ρ(x) := ρ_poly[4, 1]*x^3 + ρ_poly[3, 1]*x^2 + ρ_poly[2, 1]*x + ρ_poly[1, 1]
ρ_actual := ρ(T_del_actual) = [8.23926; 8.24321; 8.23882] lbm/gal  # disabled
ρ_actual_all := ρ(T_del_all) = [8.23926; 8.24321; 8.23882; 8.23992; 8.24014; 8.23992; 8.24124; 8.23926; 8.24408; 8.23593; 8.23682] lbm/gal
ρ_supply_all := ρ(T_in_all) = [8.33839; 8.33864; 8.33839; 8.33845; 8.33845; 8.33858; 8.33876; 8.33839; 8.339; 8.33845; 8.3387] lbm/gal  # disabled
# Recovery EFF: density of stored hot water evaluated at (T̅max,1 + T̅o)/2
ρ_2 := ρ((T_max1 + T_0)/2) = 8.24091 lb/gal
# Hourly Standby Loss:density of stored hot water, (T̅su,f + T̅su,0)/2
ρ_standby := ρ((T_suf + T_su0)/2) = 8.23915 lb/gal
# Daily Water Heating Consumption: density of the stored hot water, evaluated at (T̅24 + T̅0)/2
ρ_24 := ρ((T_24 + T_0)/2) = 8.24266 lb/gal
ρ_theo := ρ(125 °F) = 8.24036 lb/gal
# Determine mass of water removed
# Determine mass of water
M_all := vectorize(ρ_actual_all*Draw_amounts_actual) = [123.424; 16.3215; 8.15643; 49.2747; 32.9606; 8.07513; 8.07642; 8.07448; 16.2408; 16.2248; 24.7105] lbm
M_cluster := [M_all[0]; M_all[1]; M_all[2]] = [123.424; 16.3215; 8.15643] lbm
# Determine Cp as function of temperature
T_water_Cp := [32; 41; 50; 59; 68; 77; 86; 95; 104; 113; 122; 131; 140; 149; 158; 167; 176; 185; 194; 203; 212] °F
C_p_water := [4217; 4202; 4192; 4185.51; 4182; 4180; 4178; 4178; 4179; 4181; 4182; 4183; 4185; 4188; 4191; 4194; 4198; 4203; 4208; 4213; 4219] J/(kg*K)
Cp_poly := polyfitc(T_water_Cp, C_p_water, 5) = [
    "Term", "Coefficient", "Std Error", "95% CI Low", "95% CI High", "VIF", "T", "P";
    "Intercept", 217465 m^2/(s^2*K), 21852.9, 170886 m^2/(s^2*K), 264043 m^2/(s^2*K), NaN, 9.95129, 2.66413e-8;
    "A", -3184.64 m^2/(s^2*K^2), 341.703 K, -3912.96 m^2/(s^2*K^2), -2456.32 m^2/(s^2*K^2), 3341186, -9.3199, 6.25962e-8;
    "AA", 19.005 m^2/(s^2*K^3), 2.13148 K^2, 14.4618 m^2/(s^2*K^3), 23.5481 m^2/(s^2*K^3), 217029514, 8.91634, 1.10501e-7;
    "AAA", -0.056652 m^2/(s^2*K^4), 0.00663012 K^3, -0.0707838 m^2/(s^2*K^4), -0.0425203 m^2/(s^2*K^4), 1.12316e9, -8.54465, 1.8956e-7;
    "AAAA", 8.43282e-5 m^2/(s^2*K^5), 1.02843e-5 K^4, 6.24076e-5 m^2/(s^2*K^5), 0.000106249 m^2/(s^2*K^5), 913416136, 8.19966, 3.17394e-7;
    "AAAAA", -5.01221e-8 m^2/(s^2*K^6), 6.36424e-9 K^5, -6.36872e-8 m^2/(s^2*K^6), -3.65571e-8 m^2/(s^2*K^6), 1.45026e10, -7.87558, 5.21941e-7
]
# Cp of water based on average outlet temperature
C_p(x) := Cp_poly[6, 1]*x^5 + Cp_poly[5, 1]*x^4 + Cp_poly[4, 1]*x^3 + Cp_poly[3, 1]*x^2 + Cp_poly[2, 1]*x + Cp_poly[1, 1]
# Recovery EFF: specific heat of the withdrawn water evaluated at (T̅del,1 + T̅in,1)/2
C_p1 := C_p((T_del1 + T_in1)/2) = 0.998014 BTU/(lbm*R)
# Recovery EFF: specific heat of stored hot water evaluated at (T̅max,1 + T̅o)/2
C_p2 := C_p((T_max1 + T_0)/2) = 0.998887 BTU/(lbm*R)
C_p_standby := C_p((T_suf + T_su0)/2) = 0.998922 BTU/(lbm*R)  # Hourly Standby Loss:specific heat of the stored water, (T̅su,f + T̅su,0)/2
C_p_24 := C_p((T_24 + T_0)/2) = 0.998852 BTU/(lbm*R)  # Daily Water Heating Consumption: specific heat of the stored water, evaluated at (T̅24 + T̅0)/2
C_pHW := C_p((T_del_all + T_in_all)/2) = [0.998015; 0.998012; 0.998015; 0.998014; 0.998014; 0.998014; 0.998013; 0.998015; 0.998011; 0.998018; 0.998016] BTU/(lbm*R)
# Adjusted Daily Water Heating Energy Consumption (HW)
C_pUEF := C_p((T_WH_setpoint + T_inlet_setpoint)/2) = 0.998013 BTU/(lbm*R)
# Uniform EF (UEF) Cp
# UEF: the specific heat of the water of the ith draw, evaluated at (125 °F + 58 °F)/2 = 91.5 °F
C_p_theoretical := C_p(91.5 °F) = 0.998013 BTU/(lbm*R)
# In the evaluation region...the Cp values are very close. Might try to simplify for UEF estimate
# Recovery Efficiency
# total mass removed from the start of the 24-hour simulated-use test to the end of the first recovery period
M_cluster_sum := sum(M_cluster) = 147.902 lbm
η_r := 0.98  # Electric Water Heater = 0.98
# Hourly Standby Losses
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Q_stby := Q_suf - Q_su0 = 1574.3 BTU
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# the hourly standby energy losses of the water heater, Btu/h
Q_hr := (Q_stby - (V_st*ρ_standby*C_p_standby*(T_suf - T_su0)/η_r))/τ_stby_1 = 238.006 BTU/hr
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UA := Q_hr/(T_tstby - T_astby) = 4.29614 BTU/(hr*R)
# standby heat loss coefficient of the storage tank, Btu/(h· °F)
# Daily Water Heating Consumption
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# total energy used by the water heater during the 24-hour simulated-use test, including auxiliary energy such as pilot lights, pumps, fans, etc
Q := Q_f + Q_e = 32770.2 BTU
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Q_d := Q - V_st*ρ_24*C_p_24*(T_24 - T_0)/η_r = 33349.9 BTU
# The daily water heating energy consumption
# Adjusted Daily Water Heating Energy Consumption
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Q_da := Q_d - (T_amb_nom - T_astby2)*UA*τ_stby2 = 33490.7 BTU
# Adjusted Daily Water Heating Energy Consumption (125-58) Temperature Adjustment
Q_HW := M_all*C_pHW*(T_del_all - T_in_all)/η_r = [21320.3; 20876.1; 21383.7; 21256.8; 21225.1; 21320.3; 21225.1; 21320.3; 20939.6; 21827.9; 21827.9] BTU
# Energy used to heat water (Btu/day)
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Q_HW_Mean := mean(Q_HW) = 21320.3 BTU
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# Energy used to heat water over 67 oF (Btu/day)
Q_HW67 := M_all*C_pHW*(T_WH_setpoint - T_inlet_setpoint)/η_r = 21256.8 BTU
Q_HWD := Q_HW67 - Q_HW = [-63.4533; 380.72; -126.907; 0; 31.7266; -63.4533; 31.7266; -63.4533; 317.266; -571.079; -571.079] BTU
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Q_HWD_Mean := mean(Q_HWD) = -63.4533 BTU
# Modified Daily Water Heating Energy Consumption (Btu/day)
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Q_dm := Q_da + Q_HWD = [33427.2; 33871.4; 33363.8; 33490.7; 33522.4; 33427.2; 33522.4; 33427.2; 33807.9; 32919.6; 32919.6] BTU
# Uniform Energy Factor (UEF)
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UEF := sum(M_all*C_pUEF*(T_WH_setpoint - T_inlet_setpoint)/Q_dm) = 0.623275
ΔT := T_WH_setpoint - T_inlet_setpoint = 67 R
E_annual := 365*TotalDraw_theoretical*ρ_theoretical*C_p_theoretical*ΔT/UEF = 3593.42 kW*hr
# Annual Electrical Energy Consumption
E_annual_e := E_annual*Q_e/Q = 3593.42 kW*hr
# Annual Fossil Energy Consumption
E_annual_f := E_annual - E_annual_e = 0 kW*hr
UEF_array := M_all*C_pUEF*(T_WH_setpoint - T_inlet_setpoint)/Q_dm = [0.246894; 0.032221; 0.0163469; 0.0983811; 0.0657463; 0.0161533; 0.01611; 0.016152; 0.0321219; 0.0329561; 0.0501924]
