# 24 Hour Water Heater DOE Test Calculations
T_WH_setpoint := 125 °F
T_inlet_setpoint := 58 °F
T_amb_nom := 67.5 °F
V_st := 45.19 gal  # the storage capacity of the water heater
# The volume of water removed during each draw on the hot side
Draw_amounts_actual := [14.98; 1.98; 8.96; 8.96; 4.96; 0.98; 0.98; 0.98; 0.98; 1.98; 1.96; 6.96] gal
Draw_theoretical_hot := [15; 2; 9; 9; 5; 1; 1; 1; 1; 2; 2; 7] gal
TotalDraw_theoretical := sum(Draw_theoretical_hot) = 55 gal
TotalDraw_actual := sum(Draw_amounts_actual) = 54.66 gal
# The draw cluster varies by test type (High, Medium,Low)
Draw_supply_cluster := [Draw_amounts_actual[0]; Draw_amounts_actual[1]; Draw_amounts_actual[2]] = [14.98; 1.98; 8.96] gal
# This is the Medium Usage Cluster
n := rows(Draw_amounts_actual) - 1 = 11  # Mathcad is zero indexed
ρ_theoretical := 8.24 lbm/gal
Q_su0 := 14598 BTU  # Cumulative Energy used from the start of the 1st draw to the Tsu temperature
Q_suf := 16178 BTU  # Cumulative Energy used from the start of the 1st draw to the Tsuf temperature
τ_stby_1 := 8.42 hr  # Time duration beween Tsu and Tsuf
T_suf := 123.04 °F  # TC Tree Average for the 1 minute prior to the draw directly after the 1st cluster
T_su0 := 124.4 °F  # Maximum TC Tree Temperature between the 1st cluster and the next draw
T_tstby := 123.21 °F  # Average mean tank temperature during tstby,1
T_astby := 67.99 °F  # Average ambient temperature during tstby,1
T_24 := 125.11 °F  # TC Tree Temperature at 24 hours
# Energy consumed during the recovery test. (first cycle)  (kwh x 3412 = btu)
Q_r := 8960 BTU
# Initial mean tank temp as observed 1 minute prior to start
T_0 := 120.16 °F
T_max1 := 123.16 °F  # Max mean tank temp after the first cluster.
Q_e := 34412 BTU = 10.0852 kW*hr  # Total energy used during the 24 hour simulated use test (Q24-Q0)
Q_f := 0 BTU  # total fossil fuel energy used by the water heater during the 24-hour simulated-use test, Btu (kJ)
T_astby2 := 68.07 °F  # Average ambient temp during all standby time.
# Number of hours in 24 simulated-use test when water is NOT being withdrawn from the tank. (Standby time)
τ_stby2 := 23.406 hr
T_del_all := [121.23; 120.55; 122.24; 123.92; 124.19; 123.78; 122.66; 125.44; 121.74; 126.29; 126.24; 127.59] °F
T_del_actual := [T_del_all[0]; T_del_all[1]; T_del_all[2]] = [121.23; 120.55; 122.24] °F  # Outlet Temp Cluster
T_del1 := mean(T_del_actual) = 121.34 °F  # Avg water outlet temp during the first draw cluster.
T_del1 := T_del_all[0] = 121.23 °F
T_in_all := [57.83; 57.97; 57.78; 57.86; 57.79; 57.89; 57.89; 57.95; 58.05; 57.99; 57.82; 57.87] °F
T_in := [T_in_all[0]; T_in_all[1]; T_in_all[2]] = [57.83; 57.97; 57.78] °F
T_in1 := mean(T_in) = 57.86 °F  # Avg water inlet temp during the first draw cluster.
T_in1 := T_in_all[0] = 57.83 °F
# Correct for Density of water at different temperatures
T_water := [32; 40; 50; 60; 70; 80; 90; 100; 120; 140; 160; 180; 200; 212] °F
Specific_weight := [8.3436; 8.3451; 8.343; 8.3378; 8.329; 8.3176; 8.3077; 8.2877; 8.2498; 8.2048; 8.1537; 8.0969; 8.0351; 7.9957] lbm/gal
# Temperature/Density Charts
ρ_poly := polyfitc(T_water, Specific_weight, 3) = [
    "Term", "Coefficient", "Std Error", "95% CI Low", "95% CI High", "VIF", "T", "P";
    "Intercept", 142.725 kg/m^3, 58.0108, 13.4691 kg/m^3, 271.982 kg/m^3, NaN, 2.46032, 0.016829;
    "A", 7.58969 kg/(m^3*K), 0.545416 K, 6.37443 kg/(m^3*K), 8.80496 kg/(m^3*K), 191930, 13.9154, 3.58798e-8;
    "AA", -0.0212538 kg/(m^3*K^2), 0.00170098 K^2, -0.0250438 kg/(m^3*K^2), -0.0174638 kg/(m^3*K^2), 778792, -12.495, 9.97885e-8;
    "AAA", 1.8145e-5 kg/(m^3*K^3), 1.75951e-6 K^3, 1.42245e-5 kg/(m^3*K^3), 2.20654e-5 kg/(m^3*K^3), 198443, 10.3125, 5.99031e-7
]
# Density of water based on average outlet temperature
ρ(x) := ρ_poly[4, 1]*x^3 + ρ_poly[3, 1]*x^2 + ρ_poly[2, 1]*x + ρ_poly[1, 1]
ρ_actual := ρ(T_del_actual) = [8.24852; 8.24996; 8.24636] lb/gal
ρ_supply_all := ρ(T_in_all) = [8.33868; 8.33859; 8.33871; 8.33866; 8.33871; 8.33864; 8.33864; 8.33861; 8.33855; 8.33858; 8.33869; 8.33866] lb/gal
ρ_actual_all := ρ(T_del_all) = [8.24852; 8.24996; 8.24636; 8.24273; 8.24214; 8.24303; 8.24546; 8.23939; 8.24743; 8.23751; 8.23762; 8.23461] lb/gal
# Recovery EFF: density of stored hot water evaluated at (T̅max,1 + T̅o)/2
ρ_2 := ρ((T_max1 + T_0)/2) = 8.2476 lb/gal
# Hourly Standby Loss:density of stored hot water, (T̅su,f + T̅su,0)/2
ρ_standby := ρ((T_suf + T_su0)/2) = 8.24316 lb/gal
# Daily Water Heating Consumption: density of the stored hot water, evaluated at (T̅24 + T̅0)/2
ρ_24 := ρ((T_24 + T_0)/2) = 8.24551 lb/gal
# Determine mass of water removed
# Determine mass of water
M_all := vectorize(ρ_actual_all*Draw_amounts_actual) = [123.563; 16.3349; 73.8874; 73.8548; 40.881; 8.07817; 8.08055; 8.07461; 8.08248; 16.3103; 16.1457; 57.3129] lbm
M_cluster := [M_all[0]; M_all[1]; M_all[2]] = [123.563; 16.3349; 73.8874] lbm
M_sum := sum(M_all) = 450.606 lbm
# Determine Cp as function of temperature
T_water_Cp := [32; 41; 50; 59; 68; 77; 86; 95; 104; 113; 122; 131; 140; 149; 158; 167; 176; 185; 194; 203; 212] °F
C_p_water := [4217; 4202; 4192; 4185.51; 4182; 4180; 4178; 4178; 4179; 4181; 4182; 4183; 4185; 4188; 4191; 4194; 4198; 4203; 4208; 4213; 4219] J/(kg*K)
Cp_poly := polyfitc(T_water_Cp, C_p_water, 5) = [
    "Term", "Coefficient", "Std Error", "95% CI Low", "95% CI High", "VIF", "T", "P";
    "Intercept", 217465 m^2/(s^2*K), 21852.9, 170886 m^2/(s^2*K), 264043 m^2/(s^2*K), NaN, 9.95129, 2.66413e-8;
    "A", -3184.64 m^2/(s^2*K^2), 341.703 K, -3912.96 m^2/(s^2*K^2), -2456.32 m^2/(s^2*K^2), 3341186, -9.3199, 6.25962e-8;
    "AA", 19.005 m^2/(s^2*K^3), 2.13148 K^2, 14.4618 m^2/(s^2*K^3), 23.5481 m^2/(s^2*K^3), 217029514, 8.91634, 1.10501e-7;
    "AAA", -0.056652 m^2/(s^2*K^4), 0.00663012 K^3, -0.0707838 m^2/(s^2*K^4), -0.0425203 m^2/(s^2*K^4), 1.12316e9, -8.54465, 1.8956e-7;
    "AAAA", 8.43282e-5 m^2/(s^2*K^5), 1.02843e-5 K^4, 6.24076e-5 m^2/(s^2*K^5), 0.000106249 m^2/(s^2*K^5), 913416136, 8.19966, 3.17394e-7;
    "AAAAA", -5.01221e-8 m^2/(s^2*K^6), 6.36424e-9 K^5, -6.36872e-8 m^2/(s^2*K^6), -3.65571e-8 m^2/(s^2*K^6), 1.45026e10, -7.87558, 5.21941e-7
]
# Cp of water based on average outlet temperature
C_p(x) := Cp_poly[6, 1]*x^5 + Cp_poly[5, 1]*x^4 + Cp_poly[4, 1]*x^3 + Cp_poly[3, 1]*x^2 + Cp_poly[2, 1]*x + Cp_poly[1, 1]
# Recovery EFF: specific heat of the withdrawn water evaluated at (T̅del,1 + T̅in,1)/2
C_p1 := C_p((T_del1 + T_in1)/2) = 0.998011 BTU/(lbm*R)
# Recovery EFF: specific heat of stored hot water evaluated at (T̅max,1 + T̅o)/2
C_p2 := C_p((T_max1 + T_0)/2) = 0.998757 BTU/(lbm*R)
C_p_standby := C_p((T_suf + T_su0)/2) = 0.998843 BTU/(lbm*R)  # Hourly Standby Loss:specific heat of the stored water, (T̅su,f + T̅su,0)/2
C_p_24 := C_p((T_24 + T_0)/2) = 0.998797 BTU/(lbm*R)  # Daily Water Heating Consumption: specific heat of the stored water, evaluated at (T̅24 + T̅0)/2
C_pHW := C_p((T_del_all + T_in_all)/2) = [0.998011; 0.998012; 0.998011; 0.998012; 0.998012; 0.998012; 0.998011; 0.998014; 0.998011; 0.998016; 0.998015; 0.998019] BTU/(lbm*R)
# Adjusted Daily Water Heating Energy Consumption (HW)
C_pUEF := C_p((T_WH_setpoint + T_inlet_setpoint)/2) = 0.998013 BTU/(lbm*R)
# Uniform EF (UEF) Cp
# UEF: the specific heat of the water of the ith draw, evaluated at (125 °F + 58 °F)/2 = 91.5 °F
C_p_theoretical := C_p(91.5 °F) = 0.998013 BTU/(lbm*R)
# In the evaluation region...the Cp values are very close. Might try to simplify for UEF estimate
# Recovery Efficiency
# total mass removed from the start of the 24-hour simulated-use test to the end of the first recovery period
M_cluster_sum := sum(M_cluster) = 213.785 lbm
η_r := 0.98  # Electric Water Heater = 0.98
# Hourly Standby Losses
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Q_stby := Q_suf - Q_su0 = 1580 BTU
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# the hourly standby energy losses of the water heater, Btu/h
Q_hr := (Q_stby - (V_st*ρ_standby*C_p_standby*(T_suf - T_su0)/η_r))/τ_stby_1 = 248.973 BTU/hr
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UA := Q_hr/(T_tstby - T_astby) = 4.50875 BTU/(hr*R)
# standby heat loss coefficient of the storage tank, Btu/(h· °F)
# Daily Water Heating Consumption
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# total energy used by the water heater during the 24-hour simulated-use test, including auxiliary energy such as pilot lights, pumps, fans, etc
Q := Q_f + Q_e = 34412 BTU
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Q_d := Q - V_st*ρ_24*C_p_24*(T_24 - T_0)/η_r = 32532.2 BTU
# The daily water heating energy consumption
# Adjusted Daily Water Heating Energy Consumption
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Q_da := Q_d - (T_amb_nom - T_astby2)*UA*τ_stby2 = 32592.3 BTU
# Adjusted Daily Water Heating Energy Consumption (125-58) Temperature Adjustment
Q_HW := M_all*C_pHW*(T_del_all - T_in_all)/η_r = [29093.5; 28717.2; 29579.9; 30314.1; 30470.2; 30236.1; 29722.2; 30970.4; 29226.6; 31342.1; 31397.1; 31993.7] BTU
# Energy used to heat water (Btu/day)
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Q_HW_Mean := mean(Q_HW) = 30255.3 BTU
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# Energy used to heat water over 67 oF (Btu/day)
Q_HW67 := M_all*C_pHW*(T_WH_setpoint - T_inlet_setpoint)/η_r = 30745.5 BTU
Q_HWD := Q_HW67 - Q_HW = [1652; 2028.29; 1165.58; 431.355; 275.333; 509.366; 1023.32; -224.855; 1518.92; -596.554; -651.621; -1248.18] BTU
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Q_HWD_Mean := mean(Q_HWD) = 490.245 BTU
# Modified Daily Water Heating Energy Consumption (Btu/day)
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Q_dm := Q_da + Q_HWD = [34244.3; 34620.6; 33757.9; 33023.7; 32867.7; 33101.7; 33615.7; 32367.5; 34111.3; 31995.8; 31940.7; 31344.2] BTU
# Uniform Energy Factor (UEF)
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UEF := sum(M_all*C_pUEF*(T_WH_setpoint - T_inlet_setpoint)/Q_dm) = 0.90696
ΔT := T_WH_setpoint - T_inlet_setpoint = 67 R
E_annual := 365*TotalDraw_theoretical*ρ_theoretical*C_p_theoretical*ΔT/UEF = 3574.2 kW*hr
# Annual Electrical Energy Consumption
a := UEF - 0.909 = -0.00204017
E_annual_e := E_annual*Q_e/Q = 3574.2 kW*hr
# Annual Fossil Energy Consumption
E_annual_f := E_annual - E_annual_e = 0 kW*hr
UEF_array := M_all*C_pUEF*(T_WH_setpoint - T_inlet_setpoint)/Q_dm = [0.241274; 0.0315496; 0.146355; 0.149542; 0.0831695; 0.0163183; 0.0160735; 0.0166811; 0.0158438; 0.0340863; 0.0338006; 0.122266]
