# Noritz NR83DVC
RecoveryRating := 182 gal/hr
InputRating := 180000 BTU/hr
η_thermaleff := 0.8345
β := 825 BTU/gal
RecoveryRating := (InputRating*η_thermaleff)/β = 182.073 gal/hr
# Noritz EZ111
RecoveryRating := 237 gal/hr
InputRating := 199900 BTU/hr
η_thermaleff := 0.9781
β := 825 BTU/gal
RecoveryRating := (InputRating*η_thermaleff)/β = 236.997 gal/hr
# Rinnai RL75e
RecoveryRating := 183.3 gal/hr
InputRating := 180000 BTU/hr
η_thermaleff := 0.84
β := 825 BTU/gal
RecoveryRating := (InputRating*η_thermaleff)/β = 183.273 gal/hr
# Vanward 150k
RecoveryRating := 152 gal/hr
InputRating := 150000 BTU/hr
η_thermaleff := 0.8345
β := 825 BTU/gal
RecoveryRating := (InputRating*η_thermaleff)/β = 151.727 gal/hr
# Vanward 180k
RecoveryRating := 182 gal/hr
InputRating := 180000 BTU/hr
η_thermaleff := 0.8345
β := 825 BTU/gal
RecoveryRating := (InputRating*η_thermaleff)/β = 182.073 gal/hr
# Vanward 199k
RecoveryRating := 202 gal/hr
InputRating := 199900 BTU/hr
η_thermaleff := 0.8345
β := 825 BTU/gal
RecoveryRating := (InputRating*η_thermaleff)/β = 202.202 gal/hr
