D := 6 ft
H := 5.25 in
A := π*(D/2)^2*H = 92.5342 gal
Time := 28 min
Rate := A/Time = 3.30479 gal/min
Cool_Cap := 60000 BTU/hr
C_p := 1.00142 BTU/(lb*Δ°F)
ρ := 8.34008563 lb/gal
m_dot := ρ*□  # error: Missing term or expression.
