Hole_Diameter := 1 in
HoleArea := (π*(Hole_Diameter/2)^2) = 0.785398 in^2
DoorWidth := 19 in
DoorGap := 0.5 in
UnderDoorArea := DoorWidth*DoorGap = 9.5 in^2
NumberofHoles := 12
TotalHoleArea := HoleArea*NumberofHoles = 9.42478 in^2
TotalArea := TotalHoleArea + UnderDoorArea = 18.9248 in^2
# Target Flow Area
InputRating := 32000
FlowAreaTarget := InputRating/3000 = 10.6667  # 1in^2 per 1000 BTU/hr
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