# Water Heater First Hour EF Calculations (Reviewing Density Differences)
Draw_amounts_supply := [10.71; 10.72; 10.73; 10.74; 10.75; 10.76] gal
# the volume of water removed during the ith draw of the first-hour rating test
# (Cold side flow meter)
n := rows(Draw_amounts_supply) - 1 = 5  # Mathcad is zero indexed
# average water outlet temperature measured during the (n−1)th draw
T_del_actual := [125.1; 125.2; 125.3; 125.4; 125.5; 125.6] °F
T_del_supply := [58; 58; 58; 58; 58; 58] °F
T_min := [122.1; 122.2; 122.3; 122.4; 122.5; 122.6] °F
T_water := [32; 40; 50; 60; 70; 80; 90; 100; 120; 140; 160; 180; 200; 212] °F
Specific_weight := [8.3436; 8.3451; 8.343; 8.3378; 8.329; 8.3176; 8.3077; 8.2877; 8.2498; 8.2048; 8.1537; 8.0969; 8.0351; 7.9957] lb/gal
# Temperature/Density Charts
ρ_poly := polyfitc(T_water, Specific_weight, 3) = [
    "Term", "Coefficient", "Std Error", "95% CI Low", "95% CI High", "VIF", "T", "P";
    "Intercept", 8.91005 lb/ft^3, 58.0108, 0.840849 lb/ft^3, 16.9793 lb/ft^3, NaN, 2.46032, 0.016829;
    "A", 0.473809 lb/(ft^3*K), 0.545416 K, 0.397943 lb/(ft^3*K), 0.549676 lb/(ft^3*K), 191930, 13.9154, 3.58798e-8;
    "AA", -0.00132683 lb/(ft^3*K^2), 0.00170098 K^2, -0.00156343 lb/(ft^3*K^2), -0.00109023 lb/(ft^3*K^2), 778792, -12.495, 9.97885e-8;
    "AAA", 1.13275e-6 lb/(ft^3*K^3), 1.75951e-6 K^3, 8.88008e-7 lb/(ft^3*K^3), 1.3775e-6 lb/(ft^3*K^3), 198443, 10.3125, 5.99031e-7
]
# Density of water based on average outlet temperature
ρ(x) := ρ_poly[4, 1]*x^3 + ρ_poly[3, 1]*x^2 + ρ_poly[2, 1]*x + ρ_poly[1, 1]
ρ_supply := ρ(T_del_supply) = [8.33858; 8.33858; 8.33858; 8.33858; 8.33858; 8.33858] lb/gal
ρ_actual := ρ(T_del_actual) = [8.24014; 8.23992; 8.2397; 8.23948; 8.23926; 8.23904] lb/gal
M_mass := vectorize(ρ_supply*Draw_amounts_supply) = [89.3062; 89.3895; 89.4729; 89.5563; 89.6397; 89.7231] lbm
# Solve for mass of water with correct density at supply temp
Draw_amounts_actual := vectorize(M_mass/ρ_actual) = [10.8379; 10.8483; 10.8588; 10.8692; 10.8796; 10.89] gal  # This is the actual draw amount
Draw_amounts_diff := Draw_amounts_supply - Draw_amounts_actual = [-0.127936; -0.128345; -0.128756; -0.129166; -0.129578; -0.129991] gal
# Gallon diff per draw
F_hr_supply := sum(Draw_amounts_supply) = 64.41 gal  # First-hour rating @ 58 degrees F
F_hr_actual := sum(Draw_amounts_actual) = 65.1838 gal  # First-hour rating @ specified outlet temps F
F_hr_densityDIFF := F_hr_supply - F_hr_actual = -0.773772 gal
# Difference due to density
# For the case in which a draw is not in progress at one hour from the start of the test and a final draw is imposed at the elapsed time of one hour, the first-hour rating shall be calculated using
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T_del_actual[n] = 125.6 °F
T_min[n - 1] = 122.5 °F
T_del_actual[n - 1] = 125.5 °F
T_min[n - 1] = 122.5 °F
# This is a modifier if you miss
# the 1 hour mark on the last
# draw
Draw_factor_last := (T_del_actual[n] - T_min[n - 1])/(T_del_actual[n - 1] - T_min[n - 1]) = 1.03333
F_hr_lastdraw := Draw_amounts_actual[n]*Draw_factor_last = 11.253 gal
# Delete the last draw in the array (follow above equation)
NMinus1 := submatrix(Draw_amounts_actual, 0, n - 1, 0, 0) = [10.8379; 10.8483; 10.8588; 10.8692; 10.8796] gal
# FHD if you miss the 1 hour mark
F_hr_actual := sum(NMinus1) + F_hr_lastdraw = 65.5468 gal
