# Thermal Efficiency Symbolic
T_rise := T_outlet - T_inlet → T_outlet - T_inlet
Weight_water := Gallons_water_used*ρ_outlet → ρ_outlet*Gallons_water_used
Heat_absorbed := (Weight_water*C_p*T_rise) → -(C_p*ρ_outlet*Gallons_water_used*(T_inlet - T_outlet))
Heat_used := (Gas_corr_used*HHV) + Electric_used → Electric_used + HHV*Gas_corr_used
η := Heat_absorbed/Heat_used → -C_p*ρ_outlet*Gallons_water_used*(T_inlet - T_outlet)/(Electric_used + HHV*Gas_corr_used)
# Thermal Rate Symbolic (With Electric Energy) - Keep in mind, the electric energy does not heat the water. May not need
T_rise := T_outlet - T_inlet → T_outlet - T_inlet
Weight_water := Gallons_water_used*ρ_outlet → ρ_outlet*Gallons_water_used
Heat_absorbed := (Weight_water*C_p*T_rise) → -(C_p*ρ_outlet*Gallons_water_used*(T_inlet - T_outlet))
Heat_used := (Gas_corr_used*HHV) + Electric_used → Electric_used + HHV*Gas_corr_used
η := Heat_absorbed/Heat_used → -C_p*ρ_outlet*Gallons_water_used*(T_inlet - T_outlet)/(Electric_used + HHV*Gas_corr_used)
Heat_input := m_dot_gas*HHV → HHV*m_dot_gas
A := (Heat_input*η) → -HHV*C_p*m_dot_gas*ρ_outlet*Gallons_water_used*(T_inlet - T_outlet)/(Electric_used + HHV*Gas_corr_used)
B := ΔT*ρ_outlet*C_p → ΔT*C_p*ρ_outlet
Rate := A/B → -HHV*C_p*m_dot_gas*Gallons_water_used*(T_inlet - T_outlet)/(ΔT*C_p*(Electric_used + HHV*Gas_corr_used))
# Thermal Rate Symbolic (Without Electric Energy)
T_rise := T_outlet - T_inlet → T_outlet - T_inlet
Weight_water := Gallons_water_used*ρ_outlet → ρ_outlet*Gallons_water_used
Heat_absorbed := (Weight_water*C_p*T_rise) → -(C_p*ρ_outlet*Gallons_water_used*(T_inlet - T_outlet))
Heat_used := (Gas_corr_used*HHV) → HHV*Gas_corr_used
η := Heat_absorbed/Heat_used → -C_p*ρ_outlet*Gallons_water_used*(T_inlet - T_outlet)/(HHV*Gas_corr_used)
Heat_input := m_dot_gas*HHV → HHV*m_dot_gas
A := (Heat_input*η) → -HHV*C_p*m_dot_gas*ρ_outlet*Gallons_water_used*(T_inlet - T_outlet)/(HHV*Gas_corr_used)
B := ΔT*ρ_outlet*C_p → ΔT*C_p*ρ_outlet  # Delta T is the target differential
Rate := A/B → -HHV*C_p*m_dot_gas*Gallons_water_used*(T_inlet - T_outlet)/(HHV*ΔT*C_p*Gas_corr_used)
# Gas Thermal - Efficiency
T_inlet := 69.34 °F
Gallons_water_used := 24.7 gal
HHV := 1069.48 BTU/ft^3
T_outlet := 135 °F
Gas_corr_used := 13.3 ft^3
m_dot_gas := 35.749 ft^3/hr
ρ_outlet := 8.2373 lbm/gal
C_p := 1.004 BTU/(Δ°F*lbm)
T_rise := T_outlet - T_inlet = 65.66 Δ°F
Weight_water := Gallons_water_used*ρ_outlet = 203.461 lbm
Heat_absorbed := (Weight_water*C_p*T_rise) = 13412.7 BTU
Heat_used := (Gas_corr_used*HHV) = 14224.1 BTU
η := Heat_absorbed/Heat_used = 0.942958  # Thermal Efficiency
# Gas Thermal Rate Simplification (Trise - Constant Efficiency)
ΔT := 65 Δ°F
Heat_input := m_dot_gas*HHV = 38232.8 BTU/hr
A := (Heat_input*η) = 36051.9 BTU/hr
B := ΔT*ρ_outlet*C_p = 511235852 BTU/hr*s/m^3
Rate := A/B = 1.11775 gal/min
Rate_1 := -m_dot_gas*Gallons_water_used*(T_inlet - T_outlet)/(ΔT*Gas_corr_used) = 1.11775 gal/min
