G_gear_ratio := 360
D_reducer := 10
P_pulley_diameter := 1.29 in = 0.032766 m  # Set Speed on Drive to 444
A := 444*1/min
R_r := G_gear_ratio*D_reducer/(P_pulley_diameter*π) = 888.307 1/in
C_speed := A/R_r = 0.499827 in/min  # A speed of 444 (on drive) is 0.5 in/min.
