A := 0.5 in/min  # Conveyer Speed
B := 549 in  # Inches of Conveyer
C := B/A = 18.3 hr  # Time per refill
144 in + 144 in + 192 in + 69 in = 549 in  # Actual Conveyor Length
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A := 0.5 in/min  # Conveyer Speed - Calc Check
B := 30 in  # Inches of Conveyer- Calc Check
C := B/A = 1 hr  # Time per refill- Calc Check
Runtime := 10 hr
MaterialLength := Runtime*A = 300 in
