# NOx Emissions Test Calculations
V_gas_start := 16.68 ft^3
V_gas_end := 57.76 ft^3
V_used_gas := V_gas_end - V_gas_start = 41.08 ft^3
T_burner_operation := 900 s = 15 min
Heating_Value := 1062.30 BTU/ft^3
# Last Minute Before Cut-Out
# Next To Last Minute
# Preceding Minute
CO_2 := [6.6%; 6.6%; 6.6%] = [0.066; 0.066; 0.066]
NO_x := [18; 17; 17] mg/L
CO_2_avg := mean(CO_2) = 0.066
NO_x_ppm_avg := mean(NO_x) = 17.3333 mg/L
CO_ppm := [94; 95; 95] mg/L
CO_ppm_avg := mean(CO_ppm) = 94.6667 mg/L
# Form M: Correction of Gas Meter Reading and Determination of Firing Rate
Rate := V_used_gas*Heating_Value/T_burner_operation = 174557 BTU/hr
# Determine Cp
C_p3_c := -4.903944*10^-9 BTU/(lb*Δ°F^4)
C_p1_c := -0.000375475 BTU/(lb*Δ°F^2)
C_p2_c := 2.584046*10^-6 BTU/(lb*Δ°F^3)
C_p_c := 1.015074 BTU/(lb*Δ°F)
C_p(x) := C_p3_c*x^3 + C_p2_c*x^2 + C_p1_c*x^1 + C_p_c
# Formulations for the Thermodynamic Properties of the Satursted Phases of H2O from 173.15 to 473.15 DegK. R.W.Hyland, A. Wexler
Upper_1 := -2403.360201 kg/m^3
Upper_2 := -1.40758895 kg/(m^3*K^1)
Upper_3 := 0.106828766 kg/(m^3*K^2)
Upper_4 := -0.000291449 kg/(m^3*K^3)
Upper_5 := 3.73498*10^-7 kg/(m^3*K^4)
Upper_6 := -2.12038*10^-10 kg/(m^3*K^5)
Lower_1 := -3.424442728 kg/m^3
Lower_2 := 0.01619785 kg/(m^3*K^1)
ρ_upper(x) := Upper_6*x^5 + Upper_5*x^4 + Upper_4*x^3 + Upper_3*x^2 + Upper_2*x + Upper_1
ρ_lower(x) := Lower_2*x + Lower_1
ρ(x) := ρ_upper(x)/ρ_lower(x)*(1 kg/m^3)
# Form K: Calculation of Heat Output
T_del := 139.53 °F
V_water_start := 21.93 gal
T_in := 54.2 °F
V_water_end := 75.20 gal
T_avg := (T_del + T_in)/2 = 96.865 °F
V_used_water := V_water_end - V_water_start = 53.27 gal
C_p1 := C_p(96.865 Δ°F) = 0.998492 BTU/(lb*Δ°F)
ρ_1 := ρ(T_in) = 8.34053 lb/gal
Heat_output := (V_used_water*ρ_1)*C_p1*(T_del - T_in) = 37855 BTU
# Form N: Calculation of NOx Emissions
C_f := (2*Heating_Value)/(1771 BTU/ft^3) - 0.13 = 1.06966  # Average Carbon Number of Fuel
C_methanepercent → C_methanepercent
C_ethanepercent → C_ethanepercent
C_propanepercent → C_propanepercent
C_butanepercent → C_butanepercent
C_co2percent → C_co2percent
C_fmethod2 := (C_methanepercent + 2*C_ethanepercent + 3*C_propanepercent + 4*C_butanepercent + C_co2percent)/100 → C_co2percent/100 + C_butanepercent/25 + C_ethanepercent/50 + 3*C_propanepercent/100 + C_methanepercent/100
# Remove Dimensions to adopt SCAQMD calculation
NO_x := NO_x_ppm_avg/(1 mg/L) = 17.3333
V_gas := V_used_gas/(1*ft^3) = 41.08
Heat_output := Heat_output/(1*BTU) = 37855
CO_2 := CO_2_avg*100 = 6.6
NO_x := (5211*C_f*NO_x*V_gas)/(CO_2*Heat_output) = 15.8859
# NOx EMISSION (lb/MMBtu)
P := 20
N_1 := 1.194*10^-7*P*1040*100/(0.5713*(20.9 - O_2percent)) == 0.024 → -0.248352/(0.5713*O_2percent - 11.94017) == 0.024
N_1 solve, O_2percent → 2.78692455803
CO_2 := 0.5713*(20.9 - 2.78692455803) = 10.348
P := 77
N_2 := 1.194*10^-7*P*1040*100/(0.5713*(20.9 - O_2percent)) == 0.093 → -0.9561552/(0.5713*O_2percent - 11.94017) == 0.093
N_2 solve, O_2percent → 2.90378310926
CO_2 := 0.5713*(20.9 - 2.90378310926) = 10.2812
# NOx EMISSION (Concentration at 3% O2)
O_2percent := 2.78692455803
N := P*(20.9 - 3)/(20.9 - O_2percent) = 76.0942
# Form K: Calculation of Heat Output
T_del := 135 °F
V_water_start := 0 gal
T_in := 72 °F
V_water_end := 78 gal
T_avg := (T_del + T_in)/2 = 103.5 °F
V_used_water := V_water_end - V_water_start = 78 gal
ρ_2 := ρ(T_in) = 8.32604 lb/gal
C_p2 := C_p(103.5 Δ°F) = 0.998456 BTU/(lb*Δ°F)
Heat_output := (V_used_water*ρ_2)*C_p2*(T_del - T_in) = 40851 BTU
# NOx Emissions Test Calculations
Heating_Value := 1040 BTU/ft^3
Rate := 199900 BTU/hr
T_burner_operation := 900 s = 15 min
MassRate := Rate/Heating_Value = 192.212 ft^3/hr
V_used_gas := MassRate*T_burner_operation = 48.0529 ft^3
# Remove Dimensions to adopt SCAQMD calculation
NO_x := 20
V_gas := V_used_gas/(1*ft^3) = 48.0529
# In November 2009, Rule 1111 was amended to be consistent with the objectives of the 2007 Air
# Quality Management Plan (AQMP) Control Measure CMB-03. The 2009 amendment
# established a new lower NOx emission limit of 14 ng/J (equivalent to 22 ppm at a reference level
# of 3% oxygen and 80% AFUE)
#
# NOx emission limit of 40 nanograms per Joule (ng/J) of heat output
# (equivalent to 61 ppm at a reference level of 3% oxygen and 80% Annual Fuel Utilization
# Efficiency (AFUE))
Heat_output := Heat_output/(1*BTU) = 40851
CO_2 := 10.348
NO_x_output := (5211*C_f*NO_x*V_gas)/(CO_2*Heat_output) = 12.6724
NO_x := 77
V_gas := V_used_gas/(1*ft^3) = 48.0529
Heat_output = 40851
CO_2 := 10.281
NO_x_output := (5211*C_f*NO_x*V_gas)/(CO_2*Heat_output) = 49.1066
CO_2_Ultimate := 11.7%
A := (CO_2_Ultimate - 3%)*100 = 8.7
