# NOx Emissions Test Calculations
V_gas_start := 16.68 ft^3
V_gas_end := 57.76 ft^3
V_used_gas := V_gas_end - V_gas_start = 41.08 ft^3
T_burner_operation := 900 s = 15 min
HHV := 1062.30 BTU/ft^3
# Last Minute Before Cut-Out
# Next To Last Minute
# Preceding Minute
CO_2 := [6.6%; 6.6%; 6.6%] = [0.066; 0.066; 0.066]
CO_2_avg := mean(CO_2) = 0.066
NO_x := [18; 17; 17] mg/L
NO_x_ppm_avg := mean(NO_x) = 17.3333 mg/L  # This is uncorrected NOx
CO_ppm := [94; 95; 95] mg/L
CO_ppm_avg := mean(CO_ppm) = 94.6667 mg/L
# Form M: Correction of Gas Meter Reading and Determination of Firing Rate
Rate := V_used_gas*Heating_Value/T_burner_operation  # error: This variable is undefined. Check that the label is set correctly.
# Determine Cp
C_p3_c := -4.903944*10^-9 BTU/(lb*Δ°F^4)
C_p1_c := -0.000375475 BTU/(lb*Δ°F^2)
C_p2_c := 2.584046*10^-6 BTU/(lb*Δ°F^3)
C_p_c := 1.015074 BTU/(lb*Δ°F)
C_p(x) := C_p3_c*x^3 + C_p2_c*x^2 + C_p1_c*x^1 + C_p_c
# Formulations for the Thermodynamic Properties of the Satursted Phases of H2O from 173.15 to 473.15 DegK. R.W.Hyland, A. Wexler
Upper_1 := -2403.360201 kg/m^3
Upper_2 := -1.40758895 kg/(m^3*K^1)
Upper_3 := 0.106828766 kg/(m^3*K^2)
Upper_4 := -0.000291449 kg/(m^3*K^3)
Upper_5 := 3.73498*10^-7 kg/(m^3*K^4)
Upper_6 := -2.12038*10^-10 kg/(m^3*K^5)
Lower_1 := -3.424442728 kg/m^3
Lower_2 := 0.01619785 kg/(m^3*K^1)
ρ_upper(x) := Upper_6*x^5 + Upper_5*x^4 + Upper_4*x^3 + Upper_3*x^2 + Upper_2*x + Upper_1
ρ_lower(x) := Lower_2*x + Lower_1
ρ(x) := ρ_upper(x)/ρ_lower(x)*(1 kg/m^3)
# Form K: Calculation of Heat Output
T_del := 139.53 °F
V_water_start := 21.93 gal
T_in := 54.2 °F
V_water_end := 75.20 gal
T_avg := (T_del + T_in)/2 = 96.865 °F
V_used_water := V_water_end - V_water_start = 53.27 gal
C_p1 := C_p(96.865 Δ°F) = 0.998492 BTU/(lb*Δ°F)  # Need to move Tavg to Cp1 when calculating
ρ_1 := ρ(T_in) = 8.34053 lb/gal
Heat_output := (V_used_water*ρ_1)*C_p1*(T_del - T_in) = 37855 BTU
# Form N: Calculation of NOx Emissions
C_f := (2*HHV)/(1771 BTU/ft^3) - 0.13 = 1.06966  # Average Carbon Number of Fuel
# Remove Dimensions to adopt SCAQMD calculation
NO_x := NO_x_ppm_avg/(1 mg/L) = 17.3333
V_gas := V_used_gas/(1*ft^3) = 41.08
Heat_output := Heat_output/(1*BTU) = 37855
CO_2 := CO_2_avg*100 = 6.6
NO_x := (5211*C_f*NO_x*V_gas)/(CO_2*Heat_output) = 15.8859
# In November 2009, Rule 1111 was amended to be consistent with the objectives of the 2007 Air
# Quality Management Plan (AQMP) Control Measure CMB-03. The 2009 amendment
# established a new lower NOx emission limit of 14 ng/J (equivalent to 22 ppm at a reference level
# of 3% oxygen and 80% AFUE)
#
# NOx emission limit of 40 nanograms per Joule (ng/J) of heat output
# (equivalent to 61 ppm at a reference level of 3% oxygen and 80% Annual Fuel Utilization
# Efficiency (AFUE))
O2_percent := 3%
# To convert the mass of NO2 to the equivalent mass of nitrogen (N), we need to account for the proportion of nitrogen in NO2. The proportion of nitrogen in NO2 by mass is:
#
# mass of nitrogen (N) / mass of NO2 = 14 amu / 46 amu
#
# When simplified, this fraction becomes:
NO_x_ngJ := (.04 mg/J)
B := (NO_x_ngJ*(22.4 L/mol))*(1 J/gm) = 0.000896 L/mol
A := (7/23)*O2_percent/20.9%*1/10000 = 0.00436863 mg/gm
MolarMass := 28.97 gm/mol
AtomicMass := 46 gm/mol
C := MolarMass/AtomicMass = 0.629783
PPM := (B/A)*C = 129.168 L/mol
NO_x_PPM := 15
AtomicMass_NOx := (46 gm/mol + 30 gm/mol)/2 = 0.038 kg/mol
CO_2_Dry := 10%
η := 78%
V_air_weight := 14.7 lb/ft^3
# 14.7 is the conversion factor to convert from volume of air to weight of air at standard conditions (1 lb of air occupies 14.7 cubic feet)
HHV_1 := 21500 BTU/ft^3
NO_x := NO_x_PPM*(CO_2_Dry/20.9%)*(1 - η)*(V_air_weight/HHV_1) = 0.00107956 lb/BTU
