# NOx Emissions Test Calculations
V_gas_start := 16.68 ft^3
V_gas_end := 57.76 ft^3
V_used_gas := V_gas_end - V_gas_start = 41.08 ft^3
T_burner_operation := 900 s
Heating_Value := 1062.30 BTU/ft^3
CO_2 := [6.6%; 6.6%; 6.6%] = [0.066; 0.066; 0.066]
CO_2_avg := mean(CO_2) = 0.066
NO_x := [18; 17; 17] mg/L
NO_x_ppm_avg := mean(NO_x) = 17.3333 mg/L
CO_ppm := [94; 95; 95] mg/L
CO_ppm_avg := mean(CO_ppm) = 94.6667 mg/L
# Form M: Correction of Gas Meter Reading and Determination of Firing Rate
Rate := V_used_gas*Heating_Value/T_burner_operation = 174557 BTU/hr
# Determine Cp
C_p3_c := -4.903944*10^-9 BTU/(lb*Δ°F^4)
C_p1_c := -0.000375475 BTU/(lb*Δ°F^2)
C_p2_c := 2.584046*10^-6 BTU/(lb*Δ°F^3)
C_p_c := 1.015074 BTU/(lb*Δ°F)
C_p(x) := C_p3_c*x^3 + C_p2_c*x^2 + C_p1_c*x^1 + C_p_c
# Formulations for the Thermodynamic Properties of the Satursted Phases of H2O from 173.15 to 473.15 DegK. R.W.Hyland, A. Wexler
Upper_1 := -2403.360201 kg/m^3
Upper_2 := -1.40758895 kg/(m^3*K^1)
Upper_3 := 0.106828766 kg/(m^3*K^2)
Upper_4 := -0.000291449 kg/(m^3*K^3)
Upper_5 := 3.73498*10^-7 kg/(m^3*K^4)
Upper_6 := -2.12038*10^-10 kg/(m^3*K^5)
Lower_1 := -3.424442728 kg/m^3
Lower_2 := 0.01619785 kg/(m^3*K^1)
ρ_upper(x) := Upper_6*x^5 + Upper_5*x^4 + Upper_4*x^3 + Upper_3*x^2 + Upper_2*x + Upper_1
ρ_lower(x) := Lower_2*x + Lower_1
ρ(x) := ρ_upper(x)/ρ_lower(x)*(1 kg/m^3)
# Form K: Calculation of Heat Output
T_del := 139.53 °F
V_water_start := 21.93 gal
T_in := 54.2 °F
V_water_end := 75.20 gal
T_avg := (T_del + T_in)/2 = 96.865 °F
V_used_water := V_water_end - V_water_start = 53.27 gal
C_p := C_p(96.865 Δ°F) = 0.998492 BTU/(lb*Δ°F)
ρ := ρ(T_in) = 8.34053 lb/gal
Heat_output := (V_used_water*ρ)*C_p*(T_del - T_in) = 37855 BTU
# Form N: Calculation of NOx Emissions
C_f := (2*Heating_Value)/(1771 BTU/ft^3) - 0.13 = 1.06966  # Average Carbon Number of Fuel
# Remove Dimensions to adopt SCAQMD calculation
NO_x := NO_x_ppm_avg/(1 mg/L) = 17.3333
V_gas := V_used_gas/(1*ft^3) = 41.08
Heat_output := Heat_output/(1*BTU) = 37855
CO_2 := CO_2_avg*100 = 6.6
NO_x := (5211*C_f*NO_x*V_gas)/(CO_2*Heat_output) = 15.8859
# Need to figure out the 5211 dimensions
NO_x := (5211*C_f*NO_x*V_gas)/(CO_2*(V_used_water*ρ)*C_p*(T_del - T_in))
