# Recovery rating — as used in this Standard, the quantity of water obtained by multiplying the manufacturer’s input rating in Btu per hour by the thermal efficiency and dividing the product by 825 Btu per gallon. This is based on a 100 °F temperature rise and a nominal specific heat for water of 8.25 Btu per gallon per degree F.
# Noritz NR83DVC
Rating := 180000 BTU/hr
ThermalEff1 := 83.417%
A := 825 BTU/gal
Recovery_Rating := Rating*ThermalEff1/A = 182.001 gal/hr
# Rheem 160,000 Mid Eff
Rating := 160000 BTU/hr
ThermalEff2 := 84.563%
A := 825 BTU/gal
Recovery_Rating := Rating*ThermalEff2/A = 164.001 gal/hr
# Rinnai 180,000 Mid Eff
Rating := 180000 BTU/hr
ThermalEff3 := 84.013%
A := 825 BTU/gal
Recovery_Rating := Rating*ThermalEff3/A = 183.301 gal/hr
Vanward_approx := (ThermalEff1 + ThermalEff2 + ThermalEff3)/3 = 0.839977
# Vanward 199,900
Rating := 199900 BTU/hr
ThermalEff3 := 84%
A := 825 BTU/gal
Recovery_Rating := Rating*ThermalEff3/A = 203.535 gal/hr
# Vanward 180,000
Rating := 180000 BTU/hr
ThermalEff3 := 84%
A := 825 BTU/gal
Recovery_Rating := Rating*ThermalEff3/A = 183.273 gal/hr
# Vanward 150,000
Rating := 150000 BTU/hr
ThermalEff3 := 84%
A := 825 BTU/gal
Recovery_Rating := Rating*ThermalEff3/A = 152.727 gal/hr
