UEF := 67*°R*M_0*C_pUEF/(Q_e + Q_f + M_0*C_pHW*(T_in0 - T_del0)/η_r + 67*°R*M_0*C_pHW/η_r - τ_stby2*(T_astby2 + (-67.5*°R))*(Q_suf - Q_su0 + V_st*ρ_standby*C_p_standby*(T_su0 - T_suf)/η_r)/(τ_stby_1*(T_astby - T_tstby)) + V_st*ρ_24*C_p_24*(T_0 - T_24)/η_r) → 67*°R*M_0*C_pUEF/(Q_e + Q_f + M_0*C_pHW*(T_in0 - T_del0)/η_r + 67*°R*M_0*C_pHW/η_r - τ_stby2*(T_astby2 + (-67.5*°R))*(Q_suf - Q_su0 + V_st*ρ_standby*C_p_standby*(T_su0 - T_suf)/η_r)/(τ_stby_1*(T_astby - T_tstby)) + V_st*ρ_24*C_p_24*(T_0 - T_24)/η_r)
# Q24
# Theoretical Draw Data
T_water_Cp := [32; 41; 50; 59; 68; 77; 86; 95; 104; 113; 122; 131; 140; 149; 158; 167; 176; 185; 194; 203; 212] °F
C_p_water := [4217; 4202; 4192; 4185.51; 4182; 4180; 4178; 4178; 4179; 4181; 4182; 4183; 4185; 4188; 4191; 4194; 4198; 4203; 4208; 4213; 4219] J/(kg*K)
T_water := [32; 40; 50; 60; 70; 80; 90; 100; 120; 140; 160; 180; 200; 212] °F
Specific_weight := [8.3436; 8.3451; 8.343; 8.3378; 8.329; 8.3176; 8.3077; 8.2877; 8.2498; 8.2048; 8.1537; 8.0969; 8.0351; 7.9957] lbm/gal
# Temperature/Density Charts
ρ_poly := polyfitc(T_water, Specific_weight, 3) = [
    "Term", "Coefficient", "Std Error", "95% CI Low", "95% CI High", "VIF", "T", "P";
    "Intercept", 142.725 kg/m^3, 58.0108, 13.4691 kg/m^3, 271.982 kg/m^3, NaN, 2.46032, 0.016829;
    "A", 7.58969 kg/(m^3*K), 0.545416 K, 6.37443 kg/(m^3*K), 8.80496 kg/(m^3*K), 191930, 13.9154, 3.58798e-8;
    "AA", -0.0212538 kg/(m^3*K^2), 0.00170098 K^2, -0.0250438 kg/(m^3*K^2), -0.0174638 kg/(m^3*K^2), 778792, -12.495, 9.97885e-8;
    "AAA", 1.8145e-5 kg/(m^3*K^3), 1.75951e-6 K^3, 1.42245e-5 kg/(m^3*K^3), 2.20654e-5 kg/(m^3*K^3), 198443, 10.3125, 5.99031e-7
]
Cp_poly := polyfitc(T_water_Cp, C_p_water, 5) = [
    "Term", "Coefficient", "Std Error", "95% CI Low", "95% CI High", "VIF", "T", "P";
    "Intercept", 217465 m^2/(s^2*K), 21852.9, 170886 m^2/(s^2*K), 264043 m^2/(s^2*K), NaN, 9.95129, 2.66413e-8;
    "A", -3184.64 m^2/(s^2*K^2), 341.703 K, -3912.96 m^2/(s^2*K^2), -2456.32 m^2/(s^2*K^2), 3341186, -9.3199, 6.25962e-8;
    "AA", 19.005 m^2/(s^2*K^3), 2.13148 K^2, 14.4618 m^2/(s^2*K^3), 23.5481 m^2/(s^2*K^3), 217029514, 8.91634, 1.10501e-7;
    "AAA", -0.056652 m^2/(s^2*K^4), 0.00663012 K^3, -0.0707838 m^2/(s^2*K^4), -0.0425203 m^2/(s^2*K^4), 1.12316e9, -8.54465, 1.8956e-7;
    "AAAA", 8.43282e-5 m^2/(s^2*K^5), 1.02843e-5 K^4, 6.24076e-5 m^2/(s^2*K^5), 0.000106249 m^2/(s^2*K^5), 913416136, 8.19966, 3.17394e-7;
    "AAAAA", -5.01221e-8 m^2/(s^2*K^6), 6.36424e-9 K^5, -6.36872e-8 m^2/(s^2*K^6), -3.65571e-8 m^2/(s^2*K^6), 1.45026e10, -7.87558, 5.21941e-7
]
# Density of water based on average outlet temperature
# Cp of water based on average outlet temperature
ρ(x) := ρ_poly[4, 1]*x^3 + ρ_poly[3, 1]*x^2 + ρ_poly[2, 1]*x + ρ_poly[1, 1]
C_p(x) := Cp_poly[6, 1]*x^5 + Cp_poly[5, 1]*x^4 + Cp_poly[4, 1]*x^3 + Cp_poly[3, 1]*x^2 + Cp_poly[2, 1]*x + Cp_poly[1, 1]
η_r := 0.98
V_st := 45.19 gal
T_0 := 121.733 °F
T_24 := 121.383 °F
T_WH_setpoint := 125 °F
T_inlet_setpoint := 58 °F
ΔT_24 := (T_24 - T_0) = -0.35 R
T_del_all := [125; 125; 125; 125; 125; 125; 125; 125; 125; 125; 125; 125] °F  # disabled
Draw_amounts_actual := [15; 2; 9; 9; 5; 1; 1; 1; 1; 2; 2; 7] gal  # disabled
T_in_all := [58; 58; 58; 58; 58; 58; 58; 58; 58; 58; 58; 58] °F  # disabled
M_all := [123.38; 16.33; 73.88; 73.85; 40.88; 8.08; 8.08; 8.07; 8.08; 16.31; 16.14; 57.31] lbm  # disabled
T_in_all := [58.203; 57.518; 58.303; 57.886; 57.852; 57.429; 57.194; 57.503; 57.56; 57.432; 57.382; 57.638] °F
T_del_all := [124.596; 125.929; 125.03; 127.464; 127.386; 127.378; 126.459; 127.778; 125.364; 127.803; 128.454; 128.571] °F
Draw_amounts_actual := [14.66; 1.92; 8.78; 8.78; 4.87; 0.94; 0.93; 0.94; 0.94; 1.92; 1.92; 6.83] gal
C_pHW := C_p((T_del_all + T_in_all)/2) = [0.998013; 0.998014; 0.998014; 0.998019; 0.998018; 0.998017; 0.998015; 0.998018; 0.998013; 0.998018; 0.99802; 0.998021] BTU/(lbm*°R)
C_p_24 := C_p((T_24 + T_0)/2) = 0.998753 BTU/(lbm*R)
ρ_24 := ρ((T_24 + T_0)/2) = 8.24782 lbm/gal
ρ_actual_all := ρ(T_del_all) = [8.24125; 8.23831; 8.2403; 8.23489; 8.23507; 8.23508; 8.23714; 8.23418; 8.23956; 8.23413; 8.23266; 8.2324] lb/gal
M_all := vectorize(ρ_actual_all*Draw_amounts_actual) = [120.817; 15.8176; 72.3498; 72.3023; 40.1048; 7.74098; 7.66054; 7.74013; 7.74519; 15.8095; 15.8067; 56.2273] lbm
Q_HW := M_all*C_pHW*(T_del_all - T_in_all)/η_r = [29758.2; 30662.7; 29907.9; 31185.7; 31166; 31352; 31045.5; 31498.2; 30390.6; 31541.2; 31855.4; 31793.1] BTU
# Energy used to heat water (Btu/day)
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Q_HW67 := M_all*C_pHW*(T_WH_setpoint - T_inlet_setpoint)/η_r = 8.801 kW*hr
C_pUEF := C_p((T_WH_setpoint + T_inlet_setpoint)/2) = 0.998013 BTU/(lbm*R)
# 125 and 58 deg exactly | Constant, exact mass | Can change start stop temps | Can change Energy to elements | No natural gas
Q_HW := M_all*C_pHW*(T_in_all - T_del_all)/η_r = [-8.72126; -8.98635; -8.76514; -9.13964; -9.13386; -9.18837; -9.09852; -9.2312; -8.90661; -9.24381; -9.33589; -9.31763] kW*hr
Q_HW67 := 67*°R*M_all*C_pHW/η_r = 8.801 kW*hr
Q_24 := V_st*ρ_24*C_p_24*(T_0 - T_24)/η_r = 0.0389632 kW*hr
Q_e := 9.52 kW*hr = 32483.6 BTU
Q_f := 0 kW*hr
Q := 12061 W*hr - 2540.6 W*hr = 9.5204 kW*hr
# Try to make the adjustment factor zero for simplicity
T_astby2 := 68 °R
T_tstby := 123.21 °F
Q_su0 := 14598 BTU
T_suf := 123.04 °F
τ_stby_1 := 8.42 hr
T_astby := 67.99 °F
Q_suf := 16178 BTU
T_su0 := 124.40 °F
τ_stby2 := 23.406 hr
C_p_standby := C_p((T_suf + T_su0)/2) = 0.998843 BTU/(lbm*R)
ρ_standby := ρ((T_suf + T_su0)/2) = 8.24316 lb/gal
# Adjustment Factor
Q_adjust := -1*(τ_stby2*(T_astby2 + (-67.5*°R))*(Q_suf - Q_su0 + V_st*ρ_standby*C_p_standby*(T_su0 - T_suf)/η_r)/(τ_stby_1*(T_astby - T_tstby))) = 0.0154641 kW*hr
Q_top := 67*°R*M_all*C_pUEF = [2.36762; 0.309973; 1.41782; 1.41689; 0.785923; 0.151698; 0.150122; 0.151682; 0.151781; 0.309815; 0.30976; 1.10187] kW*hr
# Theoretical Value
Q_bottom := Q_e + Q_f + Q_HW + Q_HW67 + Q_adjust + Q_24 = [9.65416; 9.38908; 9.61029; 9.23579; 9.24157; 9.18705; 9.2769; 9.14423; 9.46882; 9.13162; 9.03954; 9.0578] kW*hr
UEF := Q_top/Q_bottom = [0.245243; 0.0330142; 0.147532; 0.153413; 0.0850422; 0.0165122; 0.0161823; 0.0165877; 0.0160295; 0.0339278; 0.0342673; 0.121649]
UEF_sum := sum(UEF) = 0.9194
