# Long-time automatic defrost means an automatic defrost system whose successive defrost cycles are separated by 14 hours or more of compressor operating time.
# 2.9  Steady-State Condition. Steady-state conditions exist if the temperature measurements in all measured compartments taken at 4-minute intervals or less during a stabilization period are not changing at a rate greater than 0.042 °F (0.023 °C) per hour as determined by the applicable condition of paragraph (a) or (b) of this section.
#
# (a) The average of the measurements during a 2-hour period if no cycling occurs or during a number of complete repetitive compressor cycles occurring through a period of no less than 2 hours is compared to the average over an equivalent time period with 3 hours elapsing between the two measurement periods.
#
# (b) If paragraph (a) of this section cannot be used, the average of the measurements during a number of complete repetitive compressor cycles occurring through a period of no less than 2 hours and including the last complete cycle before a defrost period (or if no cycling occurs, the average of the measurements during the last 2 hours before a defrost period) are compared to the same averaging period before the following defrost period.
# 4.1  Non-automatic Defrost. If the model being tested has no automatic defrost system, the test period shall start after steady-state conditions (see section 2.9 of this appendix) have been achieved and be no less than three hours in duration. During the test period, the compressor motor shall complete two or more whole compressor cycles. (A compressor cycle is a complete “on” and a complete “off” period of the motor.) If no “off” cycling occurs, the test period shall be three hours. If fewer than two compressor cycles occur during a 24-hour period, then a single complete compressor cycle may be used.
# 4.2.1 Long-time Automatic Defrost. If the model being tested has a long-time automatic defrost system, the two-part test described in this section may be used. The first part is a stable period of compressor operation that includes no portions of the defrost cycle, such as precooling or recovery, that is otherwise the same as the test for a unit having no defrost provisions (section 4.1). The second part is designed to capture the energy consumed during all of the events occurring with the defrost control sequence that are outside of stable operation.
# 2.1.1  Ambient Temperature. Measure and record the ambient temperature at points located 3 feet (91.5 cm) above the floor and 10 inches (25.4 cm) from the center of the two sides of the unit under test. The ambient temperature shall be 90.0 ± 1 °F (32.2 ± 0.6 °C) during the stabilization period and the test period.
# 2.1.2  Ambient Temperature Gradient. The test room vertical ambient temperature gradient in any foot of vertical distance from 2 inches (5.1 cm) above the floor or supporting platform to a height of 1 foot (30.5 cm) above the top of the unit under test is not to exceed 0.5 °F per foot (0.9 °C per meter). The vertical ambient temperature gradient at locations 10 inches (25.4 cm) out from the centers of the two sides of the unit being tested is to be maintained during the test. To demonstrate that this requirement has been met, test data must include measurements taken using temperature sensors at locations 10 inches (25.4 cm) from the center of the two sides of the unit under test at heights of 2 inches (5.1 cm) and 36 inches (91.4 cm) above the floor or supporting platform and at a height of 1 foot (30.5 cm) above the unit under test.
# 4.1  Non-automatic Defrost. If the model being tested has no automatic defrost system, the test period shall start after steady-state conditions (see section 2.9 of this appendix) have been achieved and be no less than three hours in duration. During the test period, the compressor motor shall complete two or more whole compressor cycles. (A compressor cycle is a complete “on” and a complete “off” period of the motor.) If no “off” cycling occurs, the test period shall be three hours. If fewer than two compressor cycles occur during a 24-hour period, then a single complete compressor cycle may be used.
# 4.2  Automatic Defrost. If the model being tested has an automatic defrost system, the test period shall start after steady-state conditions have been achieved and be from one point during a defrost period to the same point during the next defrost period. If the model being tested has a long-time automatic defrost system, the alternative provisions of section 4.2.1 may be used. If the model being tested has a variable defrost control, the provisions of section 4.2.2 shall apply. If the model is a multiple-compressor product with automatic defrost, the provisions of section 4.2.3 shall apply. If the model being tested has long-time automatic or variable defrost control involving multiple defrost cycle types, such as for a product with a single compressor and two or more evaporators in which the evaporators are defrosted at different frequencies, the provisions of section 4.2.4 shall apply. If the model being tested has multiple defrost cycle types for which compressor run time between defrosts is a fixed time of less than 14 hours for all such cycle types, and for which the compressor run times between defrosts for different defrost cycle types are equal to or multiples of each other, the test period shall be from one point of the defrost cycle type with the longest compressor run time between defrosts to the same point during the next occurrence of this defrost cycle type. For such products not using the procedures of section 4.2.4, energy consumption shall be calculated as described in section 5.2.1.1 of this appendix.
# 4.2.1 Long-time Automatic Defrost. If the model being tested has a long-time automatic defrost system, the two-part test described in this section may be used. The first part is a stable period of compressor operation that includes no portions of the defrost cycle, such as precooling or recovery, that is otherwise the same as the test for a unit having no defrost provisions (section 4.1). The second part is designed to capture the energy consumed during all of the events occurring with the defrost control sequence that are outside of stable operation.
# 4.2.1.1  Cycling Compressor System. For a system with a cycling compressor, the second part of the test starts at the termination of the last regular compressor “on” cycle. The average compartment temperatures measured from the termination of the previous compressor “on” cycle to the termination of the last regular compressor “on” cycle must both be within 0.5 °F (0.3 °C) of their average temperatures measured for the first part of the test. If any compressor cycles occur prior to the defrost heater being energized that cause the average temperature in any compartment to deviate from its average temperature for the first part of the test by more than 0.5 °F (0.3 °C), these compressor cycles are not considered regular compressor cycles and must be included in the second part of the test. As an example, a “precooling” cycle, which is an extended compressor cycle that lowers the temperature(s) of one or more compartments prior to energizing the defrost heater, must be included in the second part of the test. The test period for the second part of the test ends at the termination of the first regular compressor “on” cycle after compartment temperatures have fully recovered to their stable conditions. The average temperatures of the compartments measured from this termination of the first regular compressor “on” cycle until the termination of the next regular compressor “on” cycle must both be within 0.5 °F (0.3 °C) of their average temperatures measured for the first part of the test. See Figure 1 of this section. Note that Figure 1 illustrates the concepts of precooling and recovery but does not represent all possible defrost cycles.
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# 4.2.1.2  Non-cycling Compressor System. For a system with a non-cycling compressor, the second part of the test starts at a time before defrost during stable operation when compartment temperatures are within 0.5 °F (0.3 °C) of their average temperatures measured for the first part of the test. The second part stops at a time after defrost during stable operation when the compartment temperatures are within 0.5 °F (0.3 °C) of their average temperatures measured for the first part of the test. See Figure 2 of this section.
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# 4.2.3.1  Measurement Frequency. Measurements of power input, cumulative electric energy consumption (watt-hours or kilowatt-hours), and compartment temperature shall be taken at regular intervals not exceeding one minute.
# 4.2.3.2  Steady-state Condition. Steady state shall be considered to have been attained after 24 hours of operation after the last adjustment of the temperature controls.
# 4.2.3.4  Test Periods. The two-part test described in this section shall be used. The first part is a stable continuous period of compressor operation that includes no defrost cycles or events associated with a defrost cycle, such as precooling or recovery, for any compressor system. The second part is a continuous test period designed to capture the energy consumed during all of the events occurring with the defrost control sequence that are outside of stable operation. The second part of the test shall be conducted separately for each automatic defrost system present.
# 4.2.3.4.1  First Part of Test. If at least one compressor cycles, the test period for the first part of the test shall include a whole number of complete primary compressor cycles comprising at least 24 hours of stable operation, unless a defrost occurs prior to completion of 24 hours of stable operation, in which case the first part of the test shall include a whole number of complete primary compressor cycles comprising at least 18 hours of stable operation. If no compressor cycles, the first part of the test shall comprise at least 24 hours of stable operation, unless a defrost occurs prior to completion of 24 hours of stable operation, in which case the first part of the test shall comprise at least 18 hours of stable operation.
# 4.2.3.4.2  Second Part of Test. (a) If at least one compressor cycles, the test period for the second part of the test starts during stable operation before all portions of the defrost cycle, at the beginning of a complete primary compressor cycle. The test period for the second part of the test ends during stable operation after all portions of the defrost cycle, including recovery, at the termination of a complete primary compressor cycle. The start and stop for the test period shall both occur either when the primary compressor starts or when the primary compressor stops. For each compressor system, the compartment temperature averages for the first and last complete compressor cycles that lie completely within the second part of the test must be within 0.5 °F (0.3 °C) of the average compartment temperature measured for the first part of the test. If any one of the compressor systems is non-cycling, its compartment temperature averages during the first and last complete primary compressor cycles of the second part of the test must be within 0.5 °F (0.3 °C) of the average compartment temperature measured for the first part of the test.
# 5.1.1  Measured Temperature. The measured temperature of a compartment is the average of all sensor temperature readings taken in that compartment at a particular point in time. Measurements shall be taken at regular intervals not to exceed 4 minutes. Measurements for multiple refrigeration system products shall be taken at regular intervals not to exceed one minute.
# 5.1.2  Compartment Temperature. The compartment temperature for each test period shall be an average of the measured temperatures taken in a compartment during the test period as defined in section 4 of this appendix. For long-time automatic defrost models, compartment temperatures shall be those measured in the first part of the test period specified in section 4.2.1 of this appendix. For models with variable defrost controls, compartment temperatures shall be those measured in the first part of the test period specified in section 4.2.2 of this appendix. For models with automatic defrost that is neither long-time nor variable defrost, the compartment temperature shall be an average of the measured temperatures taken in a compartment during a stable period of compressor operation that:
#
# (a) Includes no defrost cycles or events associated with a defrost cycle, such as precooling or recovery;
#
# (b) Is no less than three hours in duration; and
#
# (c) Includes two or more whole compressor cycles. If the compressor does not cycle, the stable period used for the temperature average shall be three hours in duration.
# R is the total number of applicable fresh food compartments, including the primary fresh food compartment and any separate auxiliary fresh food compartments (including separate auxiliary convertible compartments tested as fresh food compartments in accordance with section 2.7 of this appendix);
R := 1
TR := [39 °F; 32 °F]  # TRi is the compartment temperature of fresh food compartment “i” determined in accordance with section 5.1.2 of this appendix;
VR := [20 ft^3; 15 ft^3]  # VRi is the volume of fresh food compartment “i.”
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TR := TR*VR/sum(VR) = 36 °F  # Fresh Food Compartment Temperature
# F is the total number of applicable freezer compartments, which include the primary freezer compartment and any number of separate auxiliary freezer compartments (including separate auxiliary convertible compartments tested as freezer compartments in accordance with section 2.7 of this appendix);
F := 1
TF := [0 °F; 1 °F]  # TRi is the compartment temperature of fresh food compartment “i” determined in accordance with section 5.1.2 of this appendix;
VF := [12 ft^3; 13 ft^3]  # VRi is the volume of fresh food compartment “i.”
# Freezer Compartment Temperature
TR := TF*VF/sum(VF) = 0.52 °F
# C is the total number of applicable cooler compartments (including separate auxiliary convertible compartments tested as cooler compartments in accordance with section 2.7 of this appendix);
C := 1
TC := [55 °F; 54 °F]  # TRi is the compartment temperature of fresh food compartment “i” determined in accordance with section 5.1.2 of this appendix;
VC := [12 ft^3; 13 ft^3]  # VRi is the volume of fresh food compartment “i.”
# Cooler Compartment Temperature
TR := TC*VC/sum(VC) = 54.48 °F
# 5.2.1  Per-Day Energy Consumption. The energy consumption in kilowatt-hours per day, ET, for each test period shall be the energy expended during the test period as specified in section 4 of this appendix adjusted to a 24-hour period. The adjustment shall be determined as follows.
# 5.2.1.1  Non-Automatic Defrost and Automatic Defrost. The energy consumption in kilowatt-hours per day shall be calculated equivalent to:
K := 1
# dimensionless correction factor of 1.0 for refrigerators and refrigerator-freezers; and 0.55 for coolers and combination cooler refrigeration products to adjust for average household usage.
EP := 1.3493 kW*hr
T := 32.083 hr = 1924.98 min
Period := 24 hr = 1440 min
ET := (EP*Period*K)/T = 1.00936 kW*hr  # test cycle energy expended in kilowatt-hours per day;
# 5.2.1.2  Long-time Automatic Defrost. If the two-part test method is used, the energy consumption in kilowatt-hours per day shall be calculated equivalent to:
K := 1
# dimensionless correction factor of 1.0 for refrigerators and refrigerator-freezers; and 0.55 for coolers and combination cooler refrigeration products to adjust for average household usage.
Period := 24 hr = 1440 min
T1 := 3.433 hr = 205.98 min  # T1 and T2 = length of time in minutes of the first and second test parts respectively;
T2 := 3.4 hr = 204 min
EP1 := (1.5763 - 1.4407) kW*hr = 0.1356 kW*hr
# EP1=energy expended in kilowatt-hours during the first part of the test;
EP2 := (1.8043 - 1.4407) kW*hr = 0.3636 kW*hr
# EP2=energy expended in kilowatt-hours during the second part of the test;
# the shortest compressor run time between defrosts used in the variable defrost control algorithm (greater than or equal to 6 but less than or equal to 12 hours), or the shortest compressor run time between defrosts observed for the test (if it is shorter than the shortest run time used in the control algorithm and is greater than 6 hours), or 6 hours (if the shortest observed run time is less than 6 hours), in hours rounded to the nearest tenth of an hour;
CT_L := 12 hr
# maximum compressor run time between defrosts in hours rounded to the nearest tenth of an hour (greater than CTL but not more than 96 hours);
CT_M := 96 hr
# ratio of per day energy consumption in excess of the least energy and the maximum difference in per-day energy consumption and is equal to 0.20.
F := 0.2
CT := (CT_L*CT_M)/(F*(CT_M - CT_L) + CT_L) = 40 hr
# defrost timer run time or compressor run time between defrosts in hours required to cause it to go through a complete cycle, rounded to the nearest tenth of an hour; and
Runtime_factor := 12 hr  # factor to adjust for a 50-percent run time of the compressor in hours per day.
ET := (Period*K*EP1/T1) + (EP2 - (EP1*T2/T1))*K*(Runtime_factor/CT) = 1.01677 kW*hr
ET_1 := (Period*K*EP1/T1) = 0.947976 kW*hr
ET_2 := (EP2 - (EP1*T2/T1))*K*(Runtime_factor/CT) = 0.068791 kW*hr
