# Errors Found on Excel Sheet
# Correct Method
# Positive Displacement Gas Meter needs corrected to STP
# at 1 atm and 60F
E_uncorrected := 6.349 ft^3
GEF_1atm60F := 1040 BTU/ft^3  # Calorimeter Heating Value (ours is set at 1atm 60F) - No Correction Needed
Barometric_pressure := 29.585 in_Hg
T_std := 60 °F
P_std := 1 atm
T_atm := 78.2 °F
# This is 8.236 inH2O gas pressure.
# ATM is average pressure during sampling
in_wg := 0.00245586*atm
P_atm := 5.6*in_wg = 0.0137528 atm  # Running Gas Pressure
V_stdEPA := (Barometric_pressure + P_atm)/P_std*T_std/T_atm = 0.96859
# EPA Corrected Standard Volume
E_tg_1atm60F := E_uncorrected*V_stdEPA = 6.14958 ft^3  # Gas Volume Correction
E_gg := GEF_1atm60F*E_tg_1atm60F = 1.87435 kW*hr
# Gas Energy per Cycle in kWh
# Incorrect Method
# Positive Displacement Gas Meter needs corrected to STP
# at 1 atm and 60F
E_uncorrected := 6.349 ft^3
GEF_1atm60F := 1040 BTU/ft^3  # Calorimeter Heating Value (ours is set at 1atm 60F) - No Correction Needed
Barometric_pressure := 29.585 in_Hg
T_std := 60 °F
P_std := 1 atm
# This is 8.236 inH2O gas pressure.
# ATM is average pressure during sampling
T_atm := 78.2 °F
in_wg := 0.00245586*atm
P_atm := 5.6*in_wg = 0.0137528 atm  # Running Gas Pressure
V_stdEPA := (Barometric_pressure + P_atm)/P_std*T_std/T_atm = 0.96859
# EPA Corrected Standard Volume
GEF_incorrect := GEF_1atm60F*V_stdEPA = 1007.33 BTU/ft^3
# Gas Volume corrected TWICE
E_gg := GEF_incorrect*E_uncorrected = 1.87435 kW*hr
# Gas Energy per Cycle in kWh
# Both methods will yeild the same result do to the mathmatics. However, its incorrect and could cause confusion. The calorimeter is calibrated to 1 atm and 60F
# Annual Energy Consumption Question
WashCycle_peryear := 283*1/yr
# Current Excel Sheet
CEF := 3.59 lbf/(kW*hr)
AnnualEnergy := CEF*WashCycle_peryear = 1015.97 lbf/(kW*hr*yr)
# Units do not match
# Proposed Correction
ECC := 2.347 kW*hr
# Method 1: Annual Yearly Energy
# kWh/yr
AnnualEnergy := ECC*WashCycle_peryear = 664.201 kW*hr/yr
# OR
# Standby Power Factors
PIA := 1.477 W
SIA := 8620 hr/yr
POFF := 0 W
SOFF := 0 hr/yr
Standby_part1 := (PIA*SIA) = 12.7317 kW*hr/yr
Standby_part2 := (POFF*SOFF) = 0 kW*hr/yr
AnnualStandbyEnergy := (Standby_part1 + Standby_part2) = 12.7317 kW*hr/yr
E_TSO := AnnualStandbyEnergy*1/WashCycle_peryear = 0.0449885 kW*hr
E_cg := 2.302 kW*hr
AnnualEnergy := E_cg*WashCycle_peryear + AnnualStandbyEnergy = 664.198 kW*hr/yr
# Method 2: Annual Yearly Energy kWh/yr
