# New System
# Dryer Energy Usage (Electric) | Load Moisture Factors
E_te := 427.267 W*hr
Weight_bonedry := 8.424 lbf
# Gas Parameters (New System)
# Mass Meters are set at 1atm 60F STP (Total Volume ft3)- No Correction Needed-Integrated Absolute Pressure
E_tg_1atm60F := 6.15 ft^3
GEF_1atm60F := 1040 BTU/ft^3  # Calorimeter Heating Value (ours is set at 1atm 60F) - No Correction Needed
# Standby Power Factors
PIA := 1.477 W
SIA := 8620 hr
WashCycle_peryear := 283
POFF := 0 W
SOFF := 0 hr
Standby_part1 := (PIA*SIA) = 12.7317 kW*hr
Standby_part2 := (POFF*SOFF) = 0 kW*hr
E_TSO := (Standby_part1 + Standby_part2)*1/WashCycle_peryear = 0.0449885 kW*hr
# Combined Energy Auto Termination Calculation (Gas & Electric)
# Auto Correct Inside Mass Flow Meter EPA Corrected Standard Volume
E_gg := GEF_1atm60F*E_tg_1atm60F = 1.87448 kW*hr
# Gas Energy per Cycle in kWh
E_ge := E_te = 0.427267 kW*hr  # Electric Energy per Cycle in kWh (Ete for Gas Dryers Et for Electric
E_cg := E_gg + E_ge = 2.30175 kW*hr  # Total Energy per Cycle
ECC := E_cg + E_TSO = 2.34674 kW*hr  # Total Energy w/Standby per Cycle
# Energy Factor
EnergyFactor := Weight_bonedry/E_cg = 3.65982 lbf/(kW*hr)
# EF without Standby Losses
# Combined Energy Factor
EnergyFactor_combined := Weight_bonedry/ECC = 3.58966 lbf/(kW*hr)
# EF with Standby Losses
# Annual Energy Consumption
AnnualEnergy_combined := ECC*WashCycle_peryear = 664.127 kW*hr
# Annual Yearly Energy
# kWh/yr
# Old System
# Dryer Energy Usage (Electric) | Load Moisture Factors
E_te := 427.267 W*hr
Weight_bonedry := 8.424 lbf
# Gas Parameters (Old System)
# Positive Displacement Gas Meter needs corrected to STP
# at 1 atm and 60F
E_uncorrected := 6.349 ft^3
GEF_1atm60F := 1040 BTU/ft^3  # Calorimeter Heating Value (ours is set at 1atm 60F) - No Correction Needed
Barometric_pressure := 29.585 in_Hg
T_std := 60 °F
P_std := 1 atm
T_atm := 78.2 °F
# This is 8.236 inH2O gas pressure.
# ATM is average pressure during sampling
in_wg := 0.00245586*atm
P_atm := 5.6*in_wg = 0.0137528 atm  # Running Gas Pressure
V_stdEPA := (Barometric_pressure + P_atm)/P_std*T_std/T_atm = 0.96859
# EPA Corrected Standard Volume
E_tg_1atm60F := E_uncorrected*V_stdEPA = 6.14958 ft^3  # Gas Volume Correction
# Standby Power Factors
PIA := 1.477 W
SIA := 8620 hr
WashCycle_peryear := 283
POFF := 0 W
SOFF := 0 hr
Standby_part1 := (PIA*SIA) = 12.7317 kW*hr
Standby_part2 := (POFF*SOFF) = 0 kW*hr
E_TSO := (Standby_part1 + Standby_part2)*1/WashCycle_peryear = 0.0449885 kW*hr
# Combined Energy Auto Termination Calculation (Gas & Electric)
# Auto Correct Inside Mass Flow Meter EPA Corrected Standard Volume
E_gg := GEF_1atm60F*E_tg_1atm60F = 1.87435 kW*hr
# Gas Energy per Cycle in kWh
E_ge := E_te = 0.427267 kW*hr  # Electric Energy per Cycle in kWh (Ete for Gas Dryers Et for Electric
E_cg := E_gg + E_ge = 2.30162 kW*hr  # Total Energy per Cycle
ECC := E_cg + E_TSO = 2.34661 kW*hr  # Total Energy w/Standby per Cycle
# Energy Factor
EnergyFactor := Weight_bonedry/E_cg = 3.66003 lbf/(kW*hr)
# EF without Standby Losses
# Combined Energy Factor
EnergyFactor_combined := Weight_bonedry/ECC = 3.58986 lbf/(kW*hr)
# EF with Standby Losses
# Annual Energy Consumption
AnnualEnergy_combined := ECC*WashCycle_peryear = 664.091 kW*hr
# Annual Yearly Energy
# kWh/yr
