# Dryer Energy Usage (Electric)
ElectricEnergy_used := 404 W*hr
# Load Moisture Factors
Reading := 10
Weight_bonedry := 8.426 lbf
FullScale := 40
Weight_initial := 13.272 lbf
Weight_final := 8.568 lbf
Accuracy := Reading*0.4% + FullScale*0.2% = 0.12
# Gas Parameters
GasVolume_initial := 0 ft^3
GasVolume_final := 1.566 ft^3
volu := 0.001 ft^3 = 0.0283168 L
Barometric_pressure := 29.585 in_Hg
HeatingValue := 1006 BTU/ft^3
T_std := 60 °F
P_std := 1 atm
T_atm := 78.2 °F
# This is 8.236 inH2O gas pressure.
# ATM is average pressure during sampling
in_wg := 0.00245586*atm
P_atm := 5.6*in_wg = 0.0137528 atm
# Standby Power Factors
Power_standby := 1.477 W
Annual_inactivemode := 8620 hr
Power_offmode := 0 W
Annual_offmode := 0 hr
# General Factors
WashCycle_peryear := 283
FU := 1.04
MoistureReduction_factor := 55.5
Price_kwh := 0.16*1/(kW*hr)  # Price per kWh
# Moisture Content Calculation
MoistureContent_initial := 100*(Weight_initial - Weight_bonedry)/Weight_bonedry = 57.5125
MoistureContent_final := 100*(Weight_final - Weight_bonedry)/Weight_bonedry = 1.68526
# Gas Calculation
GasVolume_liters := GasVolume_final - GasVolume_initial = 1.566 ft^3
V_stdEPA := (Barometric_pressure + P_atm)/P_std*T_std/T_atm = 0.96859
# EPA Corrected Standard Volume
GasEnergy_consumpt := HeatingValue*GasVolume_liters*V_stdEPA = 0.447201 kW*hr
TotalEnergy_gaselectric := GasEnergy_consumpt + ElectricEnergy_used = 0.851201 kW*hr
# Combined Energy Calculation (Gas & Electric)
ElectricEnergy_corrected := MoistureReduction_factor/(MoistureContent_initial - MoistureContent_final)*FU*TotalEnergy_gaselectric = 0.880061 kW*hr
StandbyModeEnergy := ((Power_standby*Annual_inactivemode) + (Power_offmode*Annual_offmode))*1/WashCycle_peryear = 0.0449885 kW*hr
CombinedEnergy := ElectricEnergy_corrected + StandbyModeEnergy = 0.925049 kW*hr
# Energy Factor
EnergyFactor := Weight_bonedry/ElectricEnergy_corrected = 9.57434 lbf/(kW*hr)
# EF without Standby Losses
# Combined Energy Factor
EnergyFactor := Weight_bonedry/CombinedEnergy = 9.10871 lbf/(kW*hr)
# EF with Standby Losses
# Annual Energy Consumption
EnergyFactor_combined := ElectricEnergy_corrected*WashCycle_peryear = 249.057 kW*hr
# Annual Energy Cost
Annual_cost := EnergyFactor_combined*Price_kwh = 39.8491
# Price of use (Dollars)
