# Dryer Energy Usage (Electric)
ElectricEnergy_used := 404 W*hr
# Load Moisture Factors
Reading := 10
Weight_bonedry := 8.430 lbf
FullScale := 40
Weight_initial := 13.358 lbf
Weight_final := 8.498 lbf
Accuracy := Reading*0.4% + FullScale*0.2% = 0.12
# Gas Parameters
GasVolume_final := 1.566 ft^3
volu := 0.001 ft^3 = 0.0283168 L
Barometric_pressure := 29.12 in_Hg
HeatingValue := 1042 BTU/ft^3
T_std := 60 °F
T_atm := 74.5 °F
# This is 8.236 inH2O gas pressure.
# ATM is average pressure during sampling
P_std := 1 atm
in_wg := 0.00245586*atm
P_atm := 3.829*in_wg = 0.00940349 atm
V_stdEPA := (Barometric_pressure + P_atm)/P_std*T_std/T_atm = 0.955949
# EPA Corrected Standard Volume
# Standby Power Factors
Power_standby := 1.477 W
Annual_inactivemode := 8620 hr
Power_offmode := 0 W
Annual_offmode := 0 hr
rty := 174.988 L = 6.17964 ft^3
# General Factors
WashCycle_peryear := 283
Price_kwh := 0.16*1/(kW*hr)  # Price per kWh
# Moisture Content Calculation
MoistureContent_initial := 100*(Weight_initial - Weight_bonedry)/Weight_bonedry = 58.4579
MoistureContent_final := 100*(Weight_final - Weight_bonedry)/Weight_bonedry = 0.806643
# Gas Calculation
GasEnergy_consumpt := HeatingValue*(GasVolume_final*V_stdEPA) = 0.457159 kW*hr
TotalEnergy_gaselectric := GasEnergy_consumpt + ElectricEnergy_used = 0.861159 kW*hr
# Combined Energy Calculation (Gas & Electric)
StandbyModeEnergy := ((Power_standby*Annual_inactivemode) + (Power_offmode*Annual_offmode))*1/WashCycle_peryear = 0.0449885 kW*hr
CombinedEnergy := TotalEnergy_gaselectric + StandbyModeEnergy = 0.906147 kW*hr
# Energy Factor
EnergyFactor := Weight_bonedry/TotalEnergy_gaselectric = 9.78913 lbf/(kW*hr)
# EF without Standby Losses
# Combined Energy Factor
EnergyFactor := Weight_bonedry/CombinedEnergy = 9.30312 lbf/(kW*hr)
# EF with Standby Losses
# Annual Energy Consumption
EnergyFactor_combined := TotalEnergy_gaselectric*WashCycle_peryear = 243.708 kW*hr
# Annual Energy Cost
Annual_cost := EnergyFactor_combined*Price_kwh = 38.9933
# Price of use (Dollars)
