# Dryer Energy Usage (Electric)
E_te := 1.355 kW*hr
# Load Moisture Factors
Weight_bonedry := 8.548 lbf
Weight_initial := 11.592 lbf
Weight_final := 8.752 lbf
# Standby Power Factors
P_ia := 1.46 W
S_ia := 8620 hr/yr
WashCycle_peryear := 283*1/yr
P_off := 0 W
S_off := 0 hr/yr
Standby_part1 := (P_ia*S_ia) = 12.5852 kW*hr/yr
Standby_part2 := (P_off*S_off) = 0 kW*hr/yr
E_TSO := (Standby_part1 + Standby_part2)*1/WashCycle_peryear = 0.0444707 kW*hr
# General Factors
Price_kwh := 0.16*1/(kW*hr)  # Price per kWh
# Moisture Content Calculation
W_w := 100*(Weight_initial - Weight_bonedry)/Weight_bonedry = 35.6107
W_d := 100*(Weight_final - Weight_bonedry)/Weight_bonedry = 2.38652
# Energy Calculation (Electric)
ECC := E_te + E_TSO = 1.39947 kW*hr
# Energy Factor
EnergyFactor := Weight_bonedry/E_te = 6.30849 lbf/(kW*hr)
# EF without Standby Losses
# Combined Energy Factor
CombinedEnergyFactor := Weight_bonedry/ECC = 6.10802 lbf/(kW*hr)
# EF with Standby Losses
# Annual Energy Consumption
AnnualEnergy_combined := ECC*WashCycle_peryear = 396.05 kW*hr/yr
# Annual Energy Cost
Annual_cost := AnnualEnergy_combined*Price_kwh = 63.368 1/yr
# Price of use (Dollars)
# Moisture Extraction
ΔWeight := Weight_initial - Weight_final = 2.84 lbf
# Convert Units to Lbm
W_lbm := ΔWeight/g = 2.84 lbm
# Heat of Vaporization of Water
H_v := 2260 J/gm
# Latent Heat of Vaporization (Theoretical Energy Required to Extract Just Water)
Q_latent := H_v*W_lbm = 808.705 W*hr
# Extraction Efficiency
COP := Q_latent/E_te = 0.59683
CP_h20 := 1 Btu/(lb*F)
Water_boil := 212 F
Water_inlet := 55 F
Q_sensible := W_lbm*CP_h20*(Water_boil - Water_inlet) = 130.675 W*hr
