# Dryer Energy Usage (Electric)
E_te := 399.786 W*hr
# Load Moisture Factors
Weight_bonedry := 8.506 lbf
Weight_initial := 12.972 lbf
Weight_final := 8.498 lbf
# Gas Parameters
E_tg_1atm60F := 6.649 ft^3  # Mass Meters are set at 1atm 60F STP (Total Volume ft3)
GEF_1atm60F := 1005 BTU/ft^3  # Calorimeter Heating Value (ours is set at 1atm 60F)
# Standby Power Factors
P_ia := 1.52 W
S_ia := 8620 hr/yr
WashCycle_peryear := 283*1/yr
P_off := 0 W
S_off := 0 hr/yr
Standby_part1 := (P_ia*S_ia) = 13.1024 kW*hr/yr
Standby_part2 := (P_off*S_off) = 0 kW*hr/yr
E_TSO := (Standby_part1 + Standby_part2)*1/WashCycle_peryear = 0.0462982 kW*hr
# General Factors
Price_kwh_electric := 0.12*1/(kW*hr)  # Price per kWh Electric
Price_kwh_gas := 0.04*1/(kW*hr)  # Price per kWh Gas
# Moisture Content Calculation (On Auto Terminate these parameters are not included in the calculation. You only need to hit the target.)
W_w := 100*(Weight_initial - Weight_bonedry)/Weight_bonedry = 52.5041
# Moisture Content (Wet)
W_d := 100*(Weight_final - Weight_bonedry)/Weight_bonedry = -0.0940513
# Moisture Content (Dry)
# Combined Energy Auto Termination Calculation (Gas & Electric)
# Auto Correct Inside Mass Flow Meter EPA Corrected Standard Volume
E_gg := GEF_1atm60F*E_tg_1atm60F = 1.95837 kW*hr
# Gas Energy per Cycle in kWh
E_ge := E_te = 0.399786 kW*hr  # Electric Energy per Cycle in kWh (Ete for Gas Dryers Et for Electric)
E_cg := E_gg + E_ge = 2.35816 kW*hr  # Total Energy per Cycle
ECC := E_cg + E_TSO = 2.40446 kW*hr  # Total Energy w/Standby per Cycle
# Energy Factor
EnergyFactor := Weight_bonedry/E_cg = 3.60705 lbf/(kW*hr)
# EF without Standby Losses
# Combined Energy Factor
EnergyFactor_combined := Weight_bonedry/ECC = 3.5376 lbf/(kW*hr)
# EF with Standby Losses
# Annual Energy Consumption
AnnualEnergy_combined := ECC*WashCycle_peryear = 680.461 kW*hr/yr
# Annual Yearly Energy
# Annual Energy Cost
Annual_cost_electric := E_ge*Price_kwh_electric*WashCycle_peryear = 13.5767 1/yr
Annual_cost_gas := E_gg*Price_kwh_gas*WashCycle_peryear = 22.1688 1/yr
Annual_cost_total := Annual_cost_electric + Annual_cost_gas = 35.7455 1/yr
# Price of use (Dollars).
