# Dryer Energy Usage (Electric)
ElectricEnergy_used := 1.503 kW*hr
# Load Moisture Factors
Weight_bonedry := 8.546 lbf
Weight_initial := 13.46 lbf
Weight_final := 8.82 lbf
# General Factors
WashCycle_peryear := 283
MoistureReduction_factor := 53.5
FieldUse_D1 := 1.04
Price_kwh := 0.16*1/(kW*hr)  # Price per kWh
# Standby Power Factors
Power_standby := 1.451 W
Annual_inactivemode := 8620 hr
Power_offmode := 0 W
Annual_offmode := 0 hr
StandbyModeEnergy := ((Power_standby*Annual_inactivemode) + (Power_offmode*Annual_offmode))*1/WashCycle_peryear = 44.1965 W*hr
# Moisture Content Calculation
MoistureContent_initial := 100*(Weight_initial - Weight_bonedry)/Weight_bonedry = 57.5006
MoistureContent_final := 100*(Weight_final - Weight_bonedry)/Weight_bonedry = 3.20618
# Energy Calculation (Electric)
ElectricEnergy_correction_factor := MoistureReduction_factor/(MoistureContent_initial - MoistureContent_final)*FieldUse_D1 = 1.02478
# This is the core difference between D1 and D2
ElectricEnergy_corrected := ElectricEnergy_correction_factor*ElectricEnergy_used = 1.54025 kW*hr
CombinedEnergy := ElectricEnergy_corrected + StandbyModeEnergy = 1.58445 kW*hr
# Energy Factor
EnergyFactor := Weight_bonedry/ElectricEnergy_corrected = 5.54845 lbf/(kW*hr)
# EF without Standby Losses
# Combined Energy Factor
CombinedEnergyFactor := Weight_bonedry/CombinedEnergy = 5.39368 lbf/(kW*hr)
# EF with Standby Losses
# Annual Energy Consumption
EnergyFactor_combined := ElectricEnergy_corrected*WashCycle_peryear = 435.891 kW*hr
# Annual Energy Cost
Annual_cost := EnergyFactor_combined*Price_kwh = 69.7425
# Price of use (Dollars)
