# Dryer Energy Usage (Electric)
ElectricEnergy_used := 390.7 W*hr
# Load Moisture Factors
Weight_bonedry := 8.424 lbf
Weight_initial := 12.950 lbf
Weight_final := 8.590 lbf
# Gas Parameters
GasVolume_final := 7.1953 ft^3
HeatingValue := 1025 BTU/ft^3
# General Factors
WashCycle_peryear := 283
FieldUse_D1 := 1.04
MoistureReduction_factor := 53.5
Price_kwh := 0.16*1/(kW*hr)  # Price per kWh
# Standby Power Factors
Power_standby := 1.348 W
Annual_inactivemode := 8620 hr
Power_offmode := 0 W
Annual_offmode := 0 hr
StandbyModeEnergy := ((Power_standby*Annual_inactivemode) + (Power_offmode*Annual_offmode))*1/WashCycle_peryear = 41.0592 W*hr
# Moisture Content Calculation
MoistureContent_initial := 100*(Weight_initial - Weight_bonedry)/Weight_bonedry = 53.7274
MoistureContent_final := 100*(Weight_final - Weight_bonedry)/Weight_bonedry = 1.97056
# Correction Factor (D1)
ElectricEnergy_correction_factor := MoistureReduction_factor/(MoistureContent_initial - MoistureContent_final)*FieldUse_D1 = 1.07503
# Auto Correct Inside Mass Flow Meter EPA Corrected Standard Volume
GasEnergy_consumpt := HeatingValue*GasVolume_final = 2.16145 kW*hr
# Combined Energy Calculation (Gas & Electric)
TotalEnergy_gaselectric := GasEnergy_consumpt + ElectricEnergy_used = 2.55215 kW*hr
ElectricEnergy_corrected := ElectricEnergy_correction_factor*TotalEnergy_gaselectric = 2.74363 kW*hr
CombinedEnergy := ElectricEnergy_corrected + StandbyModeEnergy = 2.78469 kW*hr
# Energy Factor
EnergyFactor := Weight_bonedry/ElectricEnergy_corrected = 3.07038 lbf/(kW*hr)
# EF without Standby Losses
# Combined Energy Factor
EnergyFactor := Weight_bonedry/CombinedEnergy = 3.02511 lbf/(kW*hr)
# EF with Standby Losses
# Annual Energy Consumption
EnergyFactor_combined := ElectricEnergy_corrected*WashCycle_peryear = 776.447 kW*hr
# Annual Energy Cost
Annual_cost := EnergyFactor_combined*Price_kwh = 124.232
# Price of use (Dollars)
